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/BATCH
/COM,ANSYS RELEASE 2022 R2           BUILD 22.2      UP20220516       19:20:02
/input,menust,tmp,''
/GST,ON
/PLO,INFO,3
/GRO,CURL,ON
/CPLANE,1
WPSTYLE,,,,,,,,0
/UNITS, Si
*AFUN,DEG
/PREP7
BLC5,0,0,0.5,0.5,1
BLC5,0,0,0.5,0.5,-1
/NOPR
KEYW,PR_SET,1
KEYW,PR_STRUC,1
KEYW,PR_THERM,0
KEYW,PR_FLUID,0
KEYW,PR_ELMAG,0
KEYW,MAGNOD,0
KEYW,MAGEDG,0
KEYW,MAGHFE,0
KEYW,MAGELC,0
KEYW,PR_MULTI,0
/GO
/COM,
/COM,Preferences for GUI filtering have been set to display:
/COM,  Structural
ET,1,SOLID185
MPTEMP,,,,,,,,
MPTEMP,1,0
MPDATA,EX,1,,2.05e11
MPDATA,PRXY,1,,0.27
MPTEMP,,,,,,,,
MPTEMP,1,0
MPDATA,DENS,1,,7800
SAVE
SAVE,'save08','db','B:\KPI\term6\AnsysWork\lab10\'
/NUMBER,0
VPLOT
FLST,3,1,6,ORDE,1
FITEM,3,2
VGEN, ,P51X, , , , ,2, , ,1
klist,all,,,coord
SAVE,'save08','db','B:\KPI\term6\AnsysWork\lab10\'
FLST,5,12,4,ORDE,2
FITEM,5,1
FITEM,5,-12
CM,_Y,LINE
LSEL, , , ,P51X
CM,_Y1,LINE
CMSEL,,_Y
LESIZE,_Y1, , ,3, , , , ,1
FLST,5,4,4,ORDE,2
FITEM,5,21
FITEM,5,-24
CM,_Y,LINE
LSEL, , , ,P51X
CM,_Y1,LINE
CMSEL,,_Y
LESIZE,_Y1, , ,2, , , , ,1
FLST,5,8,4,ORDE,2
FITEM,5,13
FITEM,5,-20
CM,_Y,LINE
LSEL, , , ,P51X
CM,_Y1,LINE
CMSEL,,_Y
LESIZE,_Y1, , ,1, , , , ,1
SAVE,'save10','db','B:\KPI\term6\AnsysWork\lab10\'
FLST,5,2,6,ORDE,2
FITEM,5,1
FITEM,5,-2
CM,_Y,VOLU
VSEL, , , ,P51X
CM,_Y1,VOLU
CHKMSH,'VOLU'
CMSEL,S,_Y
MSHAPE,0,3d
MSHKEY,1
VMESH,_Y1
MSHKEY,0
CMDELE,_Y
CMDELE,_Y1
CMDELE,_Y2
SAVE,'save11','db','B:\KPI\term6\AnsysWork\lab10\'
FINISH
/SOL
ANTYPE,0
VSEL,S, , ,       1
ASLV,S
VSEL,S, , ,       1
ASLV,S
ASLV,S
APLOT
ASEL,R, , ,       2
APLOT
NSLA,S,1
NPLOT
FINISH
/PREP7
CEINTF,0.25, , , , , , ,0,
ALLSEL,ALL
/PSF,DEFA, ,1,0,1
/PBF,DEFA, ,1
/PSYMB,CS,0
/PSYMB,NDIR,0
/PSYMB,ESYS,0
/PSYMB,LDIV,0
/PSYMB,LDIR,0
/PSYMB,ADIR,0
/PSYMB,ECON,0
/PSYMB,XNODE,0
/PSYMB,DOT,1
/PSYMB,PCONV,
/PSYMB,LAYR,0
/PSYMB,FBCS,0
/PBC,ALL,,1
/PBC,NFOR,,0
/PBC,NMOM,,0
/PBC,RFOR,,0
/PBC,RMOM,,0
/PBC,PATH,,0
EPLOT
SAVE,'save14','db','B:\KPI\term6\AnsysWork\lab10\'
SAVE
FINISH
! /EXIT,ALL
/BATCH
/COM,ANSYS RELEASE 2022 R2           BUILD 22.2      UP20220516       23:15:37
/input,menust,tmp,''
/GST,ON
/PLO,INFO,3
/GRO,CURL,ON
/CPLANE,1
WPSTYLE,,,,,,,,0
RESUME,'save14','db','B:\KPI\term6\AnsysWork\lab10\',0,0
/COM,ANSYS RELEASE 2022 R2           BUILD 22.2      UP20220516       23:15:55
RESUME,'save14','db','B:\KPI\term6\AnsysWork\lab10\',0,0
/COM,ANSYS RELEASE 2022 R2           BUILD 22.2      UP20220516       23:16:41
/SOLU
/PSF,DEFA, ,1,0,1
/PBF,DEFA, ,1
/PSYMB,CS,0
/PSYMB,NDIR,0
/PSYMB,ESYS,0
/PSYMB,LDIV,0
/PSYMB,LDIR,0
/PSYMB,ADIR,0
/PSYMB,ECON,0
/PSYMB,XNODE,0
/PSYMB,DOT,1
/PSYMB,PCONV,
/PSYMB,LAYR,0
/PSYMB,FBCS,0
/PBC,ALL,,1
/PBC,NFOR,,0
/PBC,NMOM,,0
/PBC,RFOR,,0
/PBC,RMOM,,0
/PBC,PATH,,0
EPLOT
EPLOT
ALLSEL,ALL
/PSF,DEFA, ,1,0,1
/PBF,DEFA, ,1
/PSYMB,CS,0
/PSYMB,NDIR,0
/PSYMB,ESYS,0
/PSYMB,LDIV,0
/PSYMB,LDIR,0
/PSYMB,ADIR,0
/PSYMB,ECON,0
/PSYMB,XNODE,0
/PSYMB,DOT,1
/PSYMB,PCONV,
/PSYMB,LAYR,0
/PSYMB,FBCS,0
/PBC,ALL,,1
/PBC,NFOR,,0
/PBC,NMOM,,0
/PBC,RFOR,,0
/PBC,RMOM,,0
/PBC,PATH,,0
EPLOT
FLST,2,1,5,ORDE,1
FITEM,2,1
FLST,2,1,5,ORDE,1
FITEM,2,1
/GO
DA,P51X,ALL,0
FLST,2,2,5,ORDE,2
FITEM,2,4
FITEM,2,10
/GO
SFA,P51X,1,PRES,5e7
/STATUS,SOLU
SOLVE
SAVE,'save17','db','B:\KPI\term6\AnsysWork\lab10\'
FINISH
/POST1
PRRSOL,
/EFACET,1
PLNSOL, U,SUM, 0,1.0
PLESOL, S,EQV, 0,1.0
PLESOL, S,EQV, 0,1.0
SET,LAST
PLESOL, S,EQV, 0,1.0
PLNSOL,S,EQV
ANCNTR,10,0.5
SAVE,'LabWork10vol','db','B:\KPI\term6\AnsysWork\lab10\'
SAVE
FINISH
! /EXIT,ALL
/BATCH
/COM,ANSYS RELEASE 2022 R2           BUILD 22.2      UP20220516       10:06:26
/input,menust,tmp,''
/GST,ON
/PLO,INFO,3
/GRO,CURL,ON
/CPLANE,1
WPSTYLE,,,,,,,,0
RESUME,'save17','db','B:\KPI\term6\AnsysWork\lab10\part1\',0,0
/COM,ANSYS RELEASE 2022 R2           BUILD 22.2      UP20220516       10:06:36
/SOLU
FINISH
/POST1
SET,LAST
PLESOL, S,EQV, 0,1.0
FINISH
! /EXIT,NOSAV
/BATCH
/COM,ANSYS RELEASE 2022 R2           BUILD 22.2      UP20220516       09:40:23
/input,menust,tmp,''
/GST,ON
/PLO,INFO,3
/GRO,CURL,ON
/CPLANE,1
WPSTYLE,,,,,,,,0
RESUME,'save17','db','B:\KPI\term6\AnsysWork\lab10\part1\',0,0
/COM,ANSYS RELEASE 2022 R2           BUILD 22.2      UP20220516       09:40:46
/SOLU
FINISH
/POST1
SET,LAST
/EFACET,1
PLNSOL, U,SUM, 0,1.0
FINISH
! /EXIT,NOSAV
