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/BATCH
/COM,ANSYS RELEASE 2022 R2           BUILD 22.2      UP20220516       09:33:43
/input,menust,tmp,''
/GST,ON
/PLO,INFO,3
/GRO,CURL,ON
/CPLANE,1
WPSTYLE,,,,,,,,0
/UNITS, Si
/NOPR
KEYW,PR_SET,1
KEYW,PR_STRUC,1
KEYW,PR_THERM,0
KEYW,PR_FLUID,0
KEYW,PR_ELMAG,0
KEYW,MAGNOD,0
KEYW,MAGEDG,0
KEYW,MAGHFE,0
KEYW,MAGELC,0
KEYW,PR_MULTI,0
/GO
/COM,
/COM,Preferences for GUI filtering have been set to display:
/COM,  Structural
/SOLU
/NOPR
KEYW,PR_SET,1
KEYW,PR_STRUC,1
KEYW,PR_THERM,0
KEYW,PR_FLUID,0
KEYW,PR_ELMAG,0
KEYW,MAGNOD,0
KEYW,MAGEDG,0
KEYW,MAGHFE,0
KEYW,MAGELC,0
KEYW,PR_MULTI,0
/GO
/COM,
/COM,Preferences for GUI filtering have been set to display:
/COM,  Structural
FINISH
/PREP7
ET,1,SOLID186
ET,2,PLANE183
ET,3,SURF154
KEYOPT,3,2,0
KEYOPT,3,4,0
KEYOPT,3,6,0
KEYOPT,3,7,0
KEYOPT,3,8,0
KEYOPT,3,11,2
KEYOPT,3,12,0
R,1, , , , , , ,
RMORE,0,00025,0,00025,000025,0.00025,
R,1, , , ,0,0,0,
RMORE,0.00025,0.00025,0.00025,0.00025,
R,1, , , ,0,0,0,
RMORE,0.00025,0.00025,0.00025,0.00025,
R,1, , , ,0,0,0,
RMORE,0.00025,0.00025,0.00025,0.00025,
MPTEMP,,,,,,,,
MPTEMP,1,0
MPDATA,EX,1,,2.05e11
MPDATA,PRXY,1,,0.27
LPLOT
K,1,0,,,
K,1,0,0,,
*AFUN,DEG
K,2,0,0.01,,
wpstyle,0.01,0.1,-1,1,0.003,1,2,,5
FLST,2,2,8
FITEM,2,0,0,0
FITEM,2,0.984807753012E-02,-0.173648177667E-02,0
CIRCLE,P51X
WPAVE,0,0,0
KPLOT
FLST,2,4,4,ORDE,2
FITEM,2,1
FITEM,2,-4
LDELE,P51X, , ,1
K,1,0,0.01,,
K,3,0,-0.01,,
K,2,0.01,0,,
LARC,       1,       2,       3
LARC,       1,       3,       2
LARC,1,3,2,0.01,
LPLOT
LSTR,       3,       1
K,4,0,0,,
LDELE,       2, , ,1
LSTR,       3,       4
LSTR,       4,       1
LSTR,       4,       2
FLST,2,1,4,ORDE,1
FITEM,2,1
LDIV,P51X,0.5, ,2,0
FLST,2,3,4
FITEM,2,3
FITEM,2,1
FITEM,2,4
AL,P51X
FLST,2,5,4,ORDE,2
FITEM,2,1
FITEM,2,-5
LDELE,P51X, , ,1
K,1,0,0,,
K,2,0,0.01,,
K,4,0,-0.01,,
K,3,0.01,0,,
CSYS,1
CSYS,1
wpstyle,0.01,0.1,-1,1,0.003,0,2,,5
CSYS,1
LSTR,       2,       3
LDELE,       1
LARC,       1,       2,       3
FLST,2,2,8
FITEM,2,0,0,0
FITEM,2,0.1E-01,0,0
CIRCLE,P51X
FLST,2,2,4,ORDE,2
FITEM,2,2
FITEM,2,-3
LDELE,P51X
KDELE,       7
LSTR,       4,       1
KDELE,       2
KDELE,       4
LDELE,       2, , ,1
KPLOT
KDELE,       3
K,1,0,0,,
LSTR,       8,       1
LSTR,       1,       6
LSTR,       1,       5
LPLOT
FLST,2,3,4
FITEM,2,3
FITEM,2,1
FITEM,2,5
AL,P51X
FLST,2,3,4
FITEM,2,2
FITEM,2,4
FITEM,2,5
AL,P51X
SAVE,'save8','db','B:\KPI\term6\AnsysWork\lab10\part2\'
NUMMRG,ALL, , , ,LOW
SAVE,'save8','db','B:\KPI\term6\AnsysWork\lab10\part2\'
TYPE,   2
MAT,       1
REAL,       1
ESYS,       0
SECNUM,
AATT,       1,       1,   2,       0,
FLST,5,5,4,ORDE,2
FITEM,5,1
FITEM,5,-5
CM,_Y,LINE
LSEL, , , ,P51X
CM,_Y1,LINE
CMSEL,,_Y
LESIZE,_Y1, , ,6, , , , ,1
MSHKEY,0
FLST,5,2,5,ORDE,2
FITEM,5,1
FITEM,5,-2
CM,_Y,AREA
ASEL, , , ,P51X
CM,_Y1,AREA
CHKMSH,'AREA'
CMSEL,S,_Y
AMESH,_Y1
CMDELE,_Y
CMDELE,_Y1
CMDELE,_Y2
SAVE,'save11','db','B:\KPI\term6\AnsysWork\lab10\part2\'
TYPE,   1
EXTOPT,ESIZE,8,2,
EXTOPT,ACLEAR,1
EXTOPT,ATTR,0,0,0
MAT,1
REAL,1
ESYS,0
VOFFST,1,0.025, ,
VOFFST,2,-0.025, ,
RESUME,'save11','db','B:\KPI\term6\AnsysWork\lab10\part2\',0,0
/COM,ANSYS RELEASE 2022 R2           BUILD 22.2      UP20220516       09:57:30
TYPE,   1
EXTOPT,ESIZE,8,2,
EXTOPT,ACLEAR,1
EXTOPT,ATTR,0,0,0
MAT,1
REAL,1
ESYS,0
VOFFST,1,0.025, ,
VOFFST,2,0.025, ,
EPLOT
SAVE,'save12','db','B:\KPI\term6\AnsysWork\lab10\part2\'
ASEL,S, , ,       5
NSLA,S,1
NPLOT
TYPE,   3
MAT,       1
REAL,       1
ESYS,       0
SECNUM,
TSHAP,LINE
FLST,5,173,1,ORDE,5
FITEM,5,2
FITEM,5,14
FITEM,5,-25
FITEM,5,204
FITEM,5,-363
CM,_Y,node
NSEL, , , ,P51X
CM,_Y1,node
CMSEL,,_Y
CMSEL,,_Y1
ESURF,0
CMSEL,,_Y
CMDELE,_Y
CMDELE,_Y1
ESEL,S,TYPE,,3
/PSF,DEFA, ,1,0,1
/PBF,DEFA, ,1
/PSYMB,CS,0
/PSYMB,NDIR,0
/PSYMB,ESYS,1
/PSYMB,LDIV,0
/PSYMB,LDIR,0
/PSYMB,ADIR,0
/PSYMB,ECON,0
/PSYMB,XNODE,0
/PSYMB,DOT,1
/PSYMB,PCONV,
/PSYMB,LAYR,0
/PSYMB,FBCS,0
/PBC,ALL, ,1
EPLOT
SAVE,'save13','db','B:\KPI\term6\AnsysWork\lab10\part2\'
FINISH
/SOL
ANTYPE,0
NSEL,S,LOC,Z,0
FLST,2,187,1,ORDE,2
FITEM,2,1
FITEM,2,-187
/GO
D,P51X,ALL, , , , , , , , , ,
ALLSEL,ALL
FLST,2,2,5,ORDE,2
FITEM,2,4
FITEM,2,8
DA,P51X,SYMM
ESEL,S,TYPE,,3
FLST,5,48,2,ORDE,2
FITEM,5,433
FITEM,5,-480
CM,_Y,ELEM
ESEL, , , ,P51X
CM,_Y1,ELEM
CMSEL,S,_Y
CMDELE,_Y
/GO
SFE,_Y1,5,PRES, ,5e6,0,-1,0
SAVE,'save','db','B:\KPI\term6\AnsysWork\lab10\part2\'
FINISH
! /EXIT,ALL
/BATCH
/COM,ANSYS RELEASE 2022 R2           BUILD 22.2      UP20220516       10:08:36
/input,menust,tmp,''
/GST,ON
/PLO,INFO,3
/GRO,CURL,ON
/CPLANE,1
WPSTYLE,,,,,,,,0
RESUME,'save','db','B:\KPI\term6\AnsysWork\lab10\part2\',0,0
/COM,ANSYS RELEASE 2022 R2           BUILD 22.2      UP20220516       10:08:55
/PSF,PRES,NORM,2,0,1
/PBF,DEFA, ,1
/PSYMB,CS,0
/PSYMB,NDIR,0
/PSYMB,ESYS,1
/PSYMB,LDIV,0
/PSYMB,LDIR,0
/PSYMB,ADIR,0
/PSYMB,ECON,0
/PSYMB,XNODE,0
/PSYMB,DOT,1
/PSYMB,PCONV,
/PSYMB,LAYR,0
/PSYMB,FBCS,0
/PBC,ALL,,1
/PBC,NFOR,,0
/PBC,NMOM,,0
/PBC,RFOR,,0
/PBC,RMOM,,0
/PBC,PATH,,0
/SOLU
/STATUS,SOLU
SOLVE
ESEL,S,TYPE,,1
FINISH
/POST1
RSYS,1
AVPRIN,0
AVRES,2,
/EFACET,1
LAYER,0
FORCE,TOTAL
PLESOL, S,EQV, 0,1.0
FINISH
! /EXIT,NOSAV
/BATCH
/COM,ANSYS RELEASE 2022 R2           BUILD 22.2      UP20220516       10:15:53
/input,menust,tmp,''
/GST,ON
/PLO,INFO,3
/GRO,CURL,ON
/CPLANE,1
WPSTYLE,,,,,,,,0
FINISH
! /EXIT,NOSAV
/BATCH
/COM,ANSYS RELEASE 2022 R2           BUILD 22.2      UP20220516       10:23:32
/input,menust,tmp,''
/GST,ON
/PLO,INFO,3
/GRO,CURL,ON
/CPLANE,1
WPSTYLE,,,,,,,,0
RESUME,'save13','db','B:\KPI\term6\AnsysWork\lab10\part2\',0,0
/COM,ANSYS RELEASE 2022 R2           BUILD 22.2      UP20220516       10:23:39
/SOLU
FINISH
/PREP7
FINISH
/SOL
ANTYPE,0
ANTYPE,0
NSEL,S,LOC,Z,0
FLST,2,187,1,ORDE,2
FITEM,2,1
FITEM,2,-187
/GO
D,P51X,ALL, , , , , , , , , ,
ALLSEL,ALL
FLST,2,2,5,ORDE,2
FITEM,2,4
FITEM,2,8
DA,P51X,SYMM
RESUME,'save13','db','B:\KPI\term6\AnsysWork\lab10\part2\',0,0
/COM,ANSYS RELEASE 2022 R2           BUILD 22.2      UP20220516       10:35:26
ANTYPE,0
NSEL,S,LOC,Z,0
FLST,2,187,1,ORDE,2
FITEM,2,1
FITEM,2,-187
/GO
D,P51X,ALL, , , , , , , , , ,
ALLSEL,ALL
FLST,2,2,5,ORDE,2
FITEM,2,4
FITEM,2,8
DA,P51X,SYMM
SAVE,'save15','db','B:\KPI\term6\AnsysWork\lab10\part2\'
ESEL,S,TYPE,,3
FLST,5,48,2,ORDE,2
FITEM,5,433
FITEM,5,-480
CM,_Y,ELEM
ESEL, , , ,P51X
CM,_Y1,ELEM
CMSEL,S,_Y
CMDELE,_Y
/GO
SFE,_Y1,5,PRES, ,5e6,0,-1,0
/PSF,PRES,NORM,2,0,1
/PBF,DEFA, ,1
/PSYMB,CS,0
/PSYMB,NDIR,0
/PSYMB,ESYS,1
/PSYMB,LDIV,0
/PSYMB,LDIR,0
/PSYMB,ADIR,0
/PSYMB,ECON,0
/PSYMB,XNODE,0
/PSYMB,DOT,1
/PSYMB,PCONV,
/PSYMB,LAYR,0
/PSYMB,FBCS,0
/PBC,ALL,,1
/PBC,NFOR,,0
/PBC,NMOM,,0
/PBC,RFOR,,0
/PBC,RMOM,,0
/PBC,PATH,,0
SAVE,'save16','db','B:\KPI\term6\AnsysWork\lab10\part2\'
/STATUS,SOLU
! SOLVE
ALLSEL,ALL
/STATUS,SOLU
SOLVE
/BATCH
/COM,ANSYS RELEASE 2022 R2           BUILD 22.2      UP20220516       10:42:59
/input,menust,tmp,''
/GST,ON
/PLO,INFO,3
/GRO,CURL,ON
/CPLANE,1
WPSTYLE,,,,,,,,0
RESUME,'save16','db','B:\KPI\term6\AnsysWork\lab10\part2\',0,0
/COM,ANSYS RELEASE 2022 R2           BUILD 22.2      UP20220516       10:43:04
ALLSEL,ALL
SAVE,'save16','db','B:\KPI\term6\AnsysWork\lab10\part2\'
/POST1
FINISH
/SOL
/STATUS,SOLU
SOLVE
/BATCH
/COM,ANSYS RELEASE 2022 R2           BUILD 22.2      UP20220516       02:04:20
/input,menust,tmp,''
/GST,ON
/PLO,INFO,3
/GRO,CURL,ON
/CPLANE,1
WPSTYLE,,,,,,,,0
RESUME,'save16solution','db','B:\KPI\term6\AnsysWork\lab10\part2\',0,0
/COM,ANSYS RELEASE 2022 R2           BUILD 22.2      UP20220516       02:06:30
/POST1
FINISH
/SOL
ALLSEL,ALL
ESEL,S,TYPE,,1
FINISH
/POST1
RSYS,1
AVPRIN,0
AVRES,2,
/EFACET,1
LAYER,0
FORCE,TOTAL
PLESOL, S,EQV, 0,1.0
/EXPAND,2,RECT,HALF,0.00001
FINISH
! /EXIT,NOSAV
/BATCH
/COM,ANSYS RELEASE 2022 R2           BUILD 22.2      UP20220516       09:41:43
/input,menust,tmp,''
/GST,ON
/PLO,INFO,3
/GRO,CURL,ON
/CPLANE,1
WPSTYLE,,,,,,,,0
RESUME,'save16solution','db','B:\KPI\term6\AnsysWork\lab10\part2\',0,0
/COM,ANSYS RELEASE 2022 R2           BUILD 22.2      UP20220516       09:41:52
/SOLU
FINISH
/POST1
SET,LAST
RESUME,'save16','dbb','B:\KPI\term6\AnsysWork\lab10\part2\',0,0
/COM,ANSYS RELEASE 2022 R2           BUILD 22.2      UP20220516       09:42:18
SET,LAST
RESUME,'save16solution','db','B:\KPI\term6\AnsysWork\lab10\part2\',0,0
/COM,ANSYS RELEASE 2022 R2           BUILD 22.2      UP20220516       09:42:30
SET,LAST
ESEL,S,MAT,,1
RSYS,1
AVPRIN,0
AVRES,2,
/EFACET,1
LAYER,0
FORCE,TOTAL
PLESOL, S,EQV, 0,1.0
FINISH
/PREP7
NUMMRG,ALL, , , ,LOW
FINISH
/SOL
/STATUS,SOLU
SOLVE
/BATCH
/COM,ANSYS RELEASE 2022 R2           BUILD 22.2      UP20220516       09:45:18
/input,menust,tmp,''
/GST,ON
/PLO,INFO,3
/GRO,CURL,ON
/CPLANE,1
WPSTYLE,,,,,,,,0
/SOLU
RESUME,'save16solution','db','B:\KPI\term6\AnsysWork\lab10\part2\',0,0
/COM,ANSYS RELEASE 2022 R2           BUILD 22.2      UP20220516       09:45:37
FINISH
/PREP7
FINISH
! /EXIT,NOSAV
/BATCH
/COM,ANSYS RELEASE 2022 R2           BUILD 22.2      UP20220516       09:52:47
/input,menust,tmp,''
/GST,ON
/PLO,INFO,3
/GRO,CURL,ON
/CPLANE,1
WPSTYLE,,,,,,,,0
RESUME,'save16solution','db','B:\KPI\term6\AnsysWork\lab10\part2\',0,0
/COM,ANSYS RELEASE 2022 R2           BUILD 22.2      UP20220516       09:52:53
/POST1
FINISH
/SOL
FINISH
/PREP7
FINISH
! /EXIT,NOSAV
