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/BATCH
/COM,ANSYS RELEASE 2022 R2           BUILD 22.2      UP20220516       23:35:03
/input,menust,tmp,''
/GST,ON
/PLO,INFO,3
/GRO,CURL,ON
/CPLANE,1
WPSTYLE,,,,,,,,0
FINISH
! /EXIT,NOSAV
/BATCH
/COM,ANSYS RELEASE 2022 R2           BUILD 22.2      UP20220516       23:41:22
/input,menust,tmp,''
/COM,ANSYS RELEASE 2022 R2           BUILD 22.2      UP20220516       23:41:22
/GST,ON
/PLO,INFO,3
/GRO,CURL,ON
/CPLANE,1
WPSTYLE,,,,,,,,0
APLOT
/SOLU
FINISH
/PREP7
FLST,2,2,5,ORDE,2
FITEM,2,1
FITEM,2,4
AADD,P51X
FLST,2,1,5,ORDE,1
FITEM,2,2
FLST,2,1,5,ORDE,1
FITEM,2,2
VEXT,P51X, , ,0,0,0.007,,,,
SAVE
SAVE
FINISH
! /EXIT,ALL
/BATCH
/COM,ANSYS RELEASE 2022 R2           BUILD 22.2      UP20220516       00:22:10
/input,menust,tmp,''
/GST,ON
/PLO,INFO,3
/GRO,CURL,ON
/CPLANE,1
WPSTYLE,,,,,,,,0
/PREP7
/UNITS, SI
APLOT
KPLOT
PCIRC,0.06, ,-180,180,
ADELE,       1, , ,1
LPLOT
APLOT
KPLOT
/NUMBER,0
KPLOT
APLOT
LPLOT
KPLOT
WPSTYLE,,,,,,,,1
CSYS,0
WPAVE,0,0,0
CSYS,0
WPSTYLE,,,,,,,,0
PCIRC,0.03, ,90,270,
ADELE,       1, , ,1
PCIRC,0.03, ,0,180,
PCIRC,0.0225, ,0,180,
SAVE
KL,4,2, ,
KPLOT
APLOT
LPLOT
LANG,4,3,45, ,
LANG,4,3,135, ,
LANG,4,3,225, ,
LANG,6,3,45, ,
klist,all,,,coord
RESUME
/COM,ANSYS RELEASE 2022 R2           BUILD 22.2      UP20220516       00:40:57
KPLOT
LPLOT
APLOT
PCIRC,0.015, ,0,180,
ADELE,       3, , ,1
WPSTYLE,,,,,,,,1
wpstyle,0.001,0.1,-1,1,0.003,1,1,,5
wpstyle,0.0001,0.1,-1,1,0.003,1,1,,5
wpstyle,0.001,0.1,-1,1,0.003,1,0,,5
wpstyle,0.001,0.1,-1,1,0.003,1,2,,5
wpstyle,0.001,0.001,-1,1,0.003,1,0,,5
LPLOT
LLIST,ALL, , ,
alist, all
wpstyle,0.001,0.001,-1,1,0.003,0,0,,5
wpstyle,0.001,0.001,-1,1,0.003,1,2,,5
APLOT
FLST,2,2,5,ORDE,2
FITEM,2,1
FITEM,2,-2
ADELE,P51X, , ,1
klist,all,,,coord
LLIST,ALL, , ,
alist, all
PCIRC,0.03, ,0,90,
SAVE
LPLOT
PCIRC,0.0225, ,0,90,
PCIRC,0.015, ,0,90,
SAVE
LPLOT
LPLOT
LPLOT
LLIST,ALL, , ,
APLOT
LPLOT
alist, all
klist,all,,,coord
K,10,0.0225,0.0225,0,
alist, all
LLIST,ALL, , ,RAD
KPLOT
APLOT
LPLOT
KPLOT
LPLOT
KPLOT
LPLOT
EPLOT
KPLOT,10, ,1,KPT
LPLOT
/NUMBER,0
LPLOT
KPLOT
klist,all,,,coord
KDELE,      10
LPLOT
L2ANG,9,2,45,45,,,
LANG,       4,       3,90, ,
RESUME
/COM,ANSYS RELEASE 2022 R2           BUILD 22.2      UP20220516       01:39:03
LPLOT
K,10,0.0159,0.0159,0,
PCIRC,0.005, ,0,360,
RESUME
/COM,ANSYS RELEASE 2022 R2           BUILD 22.2      UP20220516       01:46:36
K,10,0.0159,0.0159,0,
KWPAVE,      10
PCIRC,0.005, ,0,360,
SAVE
FLST,2,2,5,ORDE,2
FITEM,2,1
FITEM,2,4
ASBA,P51X,       4
SAVE
FINISH
/CLEAR,NOSTART
/COM,ANSYS RELEASE 2022 R2           BUILD 22.2      UP20220516       01:49:23
/PREP7
RESUME
/COM,ANSYS RELEASE 2022 R2           BUILD 22.2      UP20220516       01:50:19
PCIRC,0.005, ,0,360,
PCIRC,0.005, ,0,360,
ADELE,       1, , ,1
RESUME
/COM,ANSYS RELEASE 2022 R2           BUILD 22.2      UP20220516       01:53:08
FLST,2,2,5,ORDE,2
FITEM,2,2
FITEM,2,5
AADD,P51X
PCIRC,0.005, ,0,360,
ASBA,       3,       3
FLST,2,2,5,ORDE,2
FITEM,2,2
FITEM,2,-3
RESUME
/COM,ANSYS RELEASE 2022 R2           BUILD 22.2      UP20220516       01:55:57
ADELE,       3, , ,1
FLST,2,2,5,ORDE,2
FITEM,2,2
FITEM,2,5
AADD,P51X
PCIRC,0.005, ,0,360,
FLST,2,2,5,ORDE,2
FITEM,2,1
FITEM,2,-2
ASBA,P51X,       1
RESUME
/COM,ANSYS RELEASE 2022 R2           BUILD 22.2      UP20220516       01:58:27
FINISH
/CLEAR,NOSTART
/COM,ANSYS RELEASE 2022 R2           BUILD 22.2      UP20220516       01:58:37
WPCSYS,-1,0
/SOLU
FINISH
/PREP7
PCIRC,0.03, ,0,90,
PCIRC,0.015, ,0,90,
FLST,2,2,5,ORDE,2
FITEM,2,1
FITEM,2,-2
FLST,2,2,5,ORDE,2
FITEM,2,1
FITEM,2,-2
FLST,3,2,5,ORDE,2
FITEM,3,1
FITEM,3,-2
ASBA,P51X,P51X
ASBA,       2,       2
ADELE,       2, , ,1
alist, all
PCIRC,0.015, ,0,90,
FLST,2,2,5,ORDE,2
FITEM,2,1
FITEM,2,-2
ASBA,P51X,       1
ASBA,       1,       2
K,10,0.0159,0.0159,0,
KWPAVE,      10
PCIRC,0.005, ,0,360,
SAVE
ASBA,       1,       1
FLST,2,2,5,ORDE,2
FITEM,2,1
FITEM,2,3
ASBA,P51X,       1
SAVE
RECTNG,0,0.0035,0.03,0.25,
RESUME
/COM,ANSYS RELEASE 2022 R2           BUILD 22.2      UP20220516       02:07:58
RECTNG,0,0.0035,0.03,0.025,
RESUME
/COM,ANSYS RELEASE 2022 R2           BUILD 22.2      UP20220516       02:08:09
CSYS,0
WPAVE,0,0,0
CSYS,0
RECTNG,0,0.0035,0.03,0.025,
/NUMBER,0
/NUMBER,0
SAVE
/NUMBER,0
/NUMBER,0
FLST,2,2,5,ORDE,2
FITEM,2,1
FITEM,2,-2
ASBA,P51X,       1
SAVE
FLST,3,1,5,ORDE,1
FITEM,3,3
ARSYM,X,P51X, , , ,0,0
RESUME
/COM,ANSYS RELEASE 2022 R2           BUILD 22.2      UP20220516       02:10:25
RECTNG,0.03,0.025,0,0.0035,
FLST,2,2,5,ORDE,2
FITEM,2,1
FITEM,2,3
ASBA,P51X,       1
RESUME
/COM,ANSYS RELEASE 2022 R2           BUILD 22.2      UP20220516       02:11:21
RECTNG,0.03,0.025,0,0.0035,
FLST,2,2,5,ORDE,2
FITEM,2,1
FITEM,2,3
ASBA,P51X,       1
SAVE
FLST,3,1,5,ORDE,1
FITEM,3,2
ARSYM,X,P51X, , , ,0,0
FLST,2,2,5,ORDE,2
FITEM,2,1
FITEM,2,-2
AADD,P51X
FLST,3,1,5,ORDE,1
FITEM,3,3
ARSYM,Y,P51X, , , ,0,0
alist, all
FLST,2,2,5,ORDE,2
FITEM,2,1
FITEM,2,3
AADD,P51X
SAVE
SAVE
FLST,2,1,5,ORDE,1
FITEM,2,2
VEXT,P51X, , ,0,0,0.005,,,,
SAVE
FINISH
! /EXIT,ALL
/BATCH
/COM,ANSYS RELEASE 2022 R2           BUILD 22.2      UP20220516       08:43:19
/input,menust,tmp,''
/COM,ANSYS RELEASE 2022 R2           BUILD 22.2      UP20220516       08:43:21
/GST,ON
/PLO,INFO,3
/GRO,CURL,ON
/CPLANE,1
WPSTYLE,,,,,,,,0
APLOT
RESUME
/COM,ANSYS RELEASE 2022 R2           BUILD 22.2      UP20220516       08:43:45
FINISH
! /EXIT,NOSAV
/BATCH
/COM,ANSYS RELEASE 2022 R2           BUILD 22.2      UP20220516       08:44:05
/input,menust,tmp,''
/COM,ANSYS RELEASE 2022 R2           BUILD 22.2      UP20220516       08:44:05
/GST,ON
/PLO,INFO,3
/GRO,CURL,ON
/CPLANE,1
WPSTYLE,,,,,,,,0
APLOT
/PREP7
FLST,2,2,5,ORDE,2
FITEM,2,1
FITEM,2,4
AADD,P51X
KDIST,       9,      35
SAVE
FINISH
! /EXIT,ALL
/BATCH
/COM,ANSYS RELEASE 2022 R2           BUILD 22.2      UP20220516       08:46:09
/input,menust,tmp,''
/COM,ANSYS RELEASE 2022 R2           BUILD 22.2      UP20220516       08:46:09
/GST,ON
/PLO,INFO,3
/GRO,CURL,ON
/CPLANE,1
WPSTYLE,,,,,,,,0
APLOT
FINISH
! /EXIT,NOSAV
/BATCH
/COM,ANSYS RELEASE 2022 R2           BUILD 22.2      UP20220516       08:46:50
/input,menust,tmp,''
/COM,ANSYS RELEASE 2022 R2           BUILD 22.2      UP20220516       08:46:50
/GST,ON
/PLO,INFO,3
/GRO,CURL,ON
/CPLANE,1
WPSTYLE,,,,,,,,0
APLOT
/PREP7
RESUME
/COM,ANSYS RELEASE 2022 R2           BUILD 22.2      UP20220516       08:48:44
RESUME,'LabWork3frm','dbb','B:\KPI\term6\AnsysWork\lab3\part2\',0,0
/COM,ANSYS RELEASE 2022 R2           BUILD 22.2      UP20220516       08:49:04
RESUME,'LabWork3frm','db','B:\KPI\term6\AnsysWork\lab3\part2\',0,0
/COM,ANSYS RELEASE 2022 R2           BUILD 22.2      UP20220516       08:49:14
RESUME
/COM,ANSYS RELEASE 2022 R2           BUILD 22.2      UP20220516       08:49:20
RESUME,'LabWork3frm','dbb','B:\KPI\term6\AnsysWork\lab3\part1\',0,0
/COM,ANSYS RELEASE 2022 R2           BUILD 22.2      UP20220516       08:49:26
RESUME,'LabWork3frm','db','B:\KPI\TERM6\ANSYSWORK\LAB3\part1\',0,0
/COM,ANSYS RELEASE 2022 R2           BUILD 22.2      UP20220516       08:49:35
FINISH
! /EXIT,NOSAV
/BATCH
/COM,ANSYS RELEASE 2022 R2           BUILD 22.2      UP20220516       08:57:09
/input,menust,tmp,''
/COM,ANSYS RELEASE 2022 R2           BUILD 22.2      UP20220516       08:57:09
/GST,ON
/PLO,INFO,3
/GRO,CURL,ON
/CPLANE,1
WPSTYLE,,,,,,,,0
RESUME
/COM,ANSYS RELEASE 2022 R2           BUILD 22.2      UP20220516       08:57:19
RESUME,'LabWork3frm','dbb','B:\KPI\term6\AnsysWork\lab3\part2\',0,0
/COM,ANSYS RELEASE 2022 R2           BUILD 22.2      UP20220516       08:59:04
RESUME,'LabWork3frm','dbb','B:\KPI\term6\AnsysWork\lab3\part1\',0,0
/COM,ANSYS RELEASE 2022 R2           BUILD 22.2      UP20220516       08:59:09
RESUME,'LabWork3frm','db','B:\KPI\term6\AnsysWork\lab3\part2\',0,0
/COM,ANSYS RELEASE 2022 R2           BUILD 22.2      UP20220516       08:59:14
RESUME,'LabWork3frm','dbb','B:\KPI\TERM6\ANSYSWORK\LAB3\part2\',0,0
/COM,ANSYS RELEASE 2022 R2           BUILD 22.2      UP20220516       08:59:43
FINISH
! /EXIT,NOSAV
