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/BATCH
/COM,ANSYS RELEASE 2022 R2           BUILD 22.2      UP20220516       17:38:48
/input,menust,tmp,''
/GST,ON
/PLO,INFO,3
/GRO,CURL,ON
/CPLANE,1
WPSTYLE,,,,,,,,0
/UNITS, SI
*AFUN,DEG
/PREP7
CONE,0.025/2-0.001,0.025/2,0,0.001,0,360,
/NUMBER,0
/LIG,   1,1, 1.000,   0.00000000000    ,   0.00000000000    ,   0.00000000000    ,   0.00000000000
KPLOT
/NUMBER,0
LPLOT
APLOT
FLST,2,4,3,ORDE,2
FITEM,2,1
FITEM,2,-4
KWPAVE,P51X
SAVE
CYLIND,0,0.025/2,0,0.025-0.001,0,360,
RESUME
/COM,ANSYS RELEASE 2022 R2           BUILD 22.2      UP20220516       17:52:55
/LIG,   1,1, 1.000,   0.00000000000    ,   0.00000000000    ,   0.00000000000    ,   0.00000000000
CYLIND,0,0.025/2,0,0.025-0.001,0,360,
RESUME
/COM,ANSYS RELEASE 2022 R2           BUILD 22.2      UP20220516       17:54:57
FLST,2,4,3,ORDE,2
FITEM,2,5
FITEM,2,-8
KWPAVE,P51X
CYLIND,0,0.025/2,0,0.025-0.001,0,360,
SAVE
FLST,2,4,3,ORDE,2
FITEM,2,13
FITEM,2,-16
KWPAVE,P51X
CYLIND,0,0.018/2,0,0.033,0,360,
SAVE
FLST,2,4,3,ORDE,2
FITEM,2,21
FITEM,2,-24
KWPAVE,P51X
CYLIND,0,0.050/2,0,0.010,0,360,
SAVE
FLST,2,4,3,ORDE,2
FITEM,2,29
FITEM,2,-32
KWPAVE,P51X
RPRISM,0,0.006,6, , ,0.032/2,
SAVE,'latest_good','db','B:\KPI\term6\AnsysWork\lab4\'
FLST,2,6,3,ORDE,2
FITEM,2,33
FITEM,2,-38
KWPAVE,P51X
CYLIND,0,0.038/2,0,0.025,0,360,
SAVE
RESUME,'latest_good','db','B:\KPI\term6\AnsysWork\lab4\',0,0
/COM,ANSYS RELEASE 2022 R2           BUILD 22.2      UP20220516       18:10:17
FLST,2,6,3,ORDE,2
FITEM,2,33
FITEM,2,-38
KWPAVE,P51X
CYLIND,0,0.038/2,0,0.025-0.001,0,360,
FLST,2,4,3,ORDE,2
FITEM,2,49
FITEM,2,-52
KWPAVE,P51X
CONE,0.038/2-0.001,0.038/2,0,0.001,0,360,
RESUME,'latest_good','db','B:\KPI\term6\AnsysWork\lab4\',0,0
/COM,ANSYS RELEASE 2022 R2           BUILD 22.2      UP20220516       18:12:30
FLST,2,6,3,ORDE,2
FITEM,2,33
FITEM,2,-38
KWPAVE,P51X
CYLIND,0,0.038/2,0,0.025-0.001,0,360,
SAVE
FLST,2,4,3,ORDE,2
FITEM,2,49
FITEM,2,-52
KWPAVE,P51X
CONE,0.038/2,0.038/2-0.001,0,0.001,0,360,
SAVE
FLST,2,7,6,ORDE,2
FITEM,2,1
FITEM,2,-7
VADD,P51X
RESUME,'LabWork4frm','db','B:\KPI\term6\AnsysWork\lab4\',0,0
/COM,ANSYS RELEASE 2022 R2           BUILD 22.2      UP20220516       18:16:41
SAVE,'latest_good2','db','B:\KPI\term6\AnsysWork\lab4\'
FLST,2,7,6,ORDE,2
FITEM,2,1
FITEM,2,-7
VADD,P51X
SAVE
FLST,2,4,3,ORDE,2
FITEM,2,57
FITEM,2,-60
KWPAVE,P51X
FLST,2,4,3,ORDE,2
FITEM,2,57
FITEM,2,-60
KWPAVE,P51X
BLC5,0,0,0.012,0.012,0.012
RESUME
/COM,ANSYS RELEASE 2022 R2           BUILD 22.2      UP20220516       18:20:56
FLST,2,4,3,ORDE,2
FITEM,2,57
FITEM,2,-60
KWPAVE,P51X
BLC5,0,0,0.012,0.012,-0.012
SAVE
VSBV,       1,       8
RESUME
/COM,ANSYS RELEASE 2022 R2           BUILD 22.2      UP20220516       18:24:41
VSBV,       1,       8
RESUME,'latest_good2','db','B:\KPI\TERM6\ANSYSWORK\LAB4\',0,0
/COM,ANSYS RELEASE 2022 R2           BUILD 22.2      UP20220516       18:25:04
FLST,2,7,6,ORDE,2
FITEM,2,1
FITEM,2,-7
VADD,P51X
BLC5,0,0,0.012,0.012,-0.012
RESUME,'latest_good2','db','B:\KPI\TERM6\ANSYSWORK\LAB4\',0,0
/COM,ANSYS RELEASE 2022 R2           BUILD 22.2      UP20220516       18:25:59
FLST,2,7,6,ORDE,2
FITEM,2,1
FITEM,2,-7
VADD,P51X
FLST,2,4,3,ORDE,2
FITEM,2,57
FITEM,2,-60
KWPAVE,P51X
BLC5,0,0,0.012,0.012,-0.012
SAVE
VSBV,       1,       8
FLST,3,2,6,ORDE,2
FITEM,3,1
FITEM,3,8
VSBV,       1,P51X
VSBV,       8,       1
SAVE
FLST,2,2,3,ORDE,2
FITEM,2,25
FITEM,2,32
KWPAVE,P51X
SAVE
CYL4,0,0,0.005/2, , , ,-0.006
RESUME
/COM,ANSYS RELEASE 2022 R2           BUILD 22.2      UP20220516       18:37:46
wprot,90
wprot,-90
wprot,0, 0, 90
wprot,0, 0, -90
wprot,0, 90, 0
wprot,0, -90, 0
wprot,0, 90, 90
wprot,0, -90, -90
wprot,0, 0, 90
wprot,0, 90
wprot,0, 90
wprot,0, 90
wprot,0, 90
wprot,0, 90, 90
CYL4,0,0,0.005/2, , , ,0.006
SAVE
FLST,2,2,3,ORDE,2
FITEM,2,28
FITEM,2,30
KWPAVE,P51X
CYL4,0,0,0.005/2, , , ,-0.006
SAVE
SAVE
FLST,3,2,6,ORDE,2
FITEM,3,1
FITEM,3,3
VSBV,       2,P51X
VSBV,       2,       1
FLST,2,2,6,ORDE,2
FITEM,2,1
FITEM,2,3
VSBV,P51X,       2
RESUME,'LabWork4frm','db','B:\KPI\TERM6\ANSYSWORK\LAB4\',0,0
/COM,ANSYS RELEASE 2022 R2           BUILD 22.2      UP20220516       18:42:12
VSBV,       2,       3
VSBV,       4,       1
VSBV,       4,       1
VSBV,       4,       1
VSBV,       4,       1
VDELE,       1, , ,1
SAVE
FLST,2,2,3,ORDE,2
FITEM,2,25
FITEM,2,32
KWPAVE,P51X
wprot,90
wprot,-90
wprot,0, 90, 0
wprot,0, -90, 0
wprot,0, 0, 90
wprot,0, 0, 90
SAVE
CYL4,0,0,0.005/2, , , ,-0.006
VSBV,       4,       1
SAVE
SAVE,'latest_good3','db','B:\KPI\TERM6\ANSYSWORK\LAB4\'
SAVE
LSTR,      20,      14
LSTR,      18,      13
LPLOT
vlist, all
VPLOT
RESUME
/COM,ANSYS RELEASE 2022 R2           BUILD 22.2      UP20220516       18:55:34
LPLOT
LPLOT
VPLOT
LSTR,      15,      19
LFILLT,87,29,0.002, ,
LPLOT
LPLOT
KPLOT
LPLOT
VPLOT
LPLOT
SAVE
LSTR,      19,      65
FLST,2,3,4
FITEM,2,90
FITEM,2,89
FITEM,2,88
AL,P51X
alist, all
APLOT
SAVE
CSYS,0
WPAVE,0,0,0
CSYS,0
WPCSYS,-1,0
wprot,0, 90, 0
SAVE
FLST,2,1,5,ORDE,1
FITEM,2,13
FLST,8,2,3
FITEM,8,27
FITEM,8,31
VROTAT,P51X, , , , , ,P51X, ,360, ,
RESUME
/COM,ANSYS RELEASE 2022 R2           BUILD 22.2      UP20220516       19:02:55
FLST,2,2,3,ORDE,2
FITEM,2,18
FITEM,2,-19
KWPAVE,P51X
K, ,0,0,0,
K, ,0,0,0.025,
KPLOT
VPLOT
/NUMBER,0
APLOT
SAVE
FLST,2,1,5,ORDE,1
FITEM,2,13
FLST,8,2,3
FITEM,8,79
FITEM,8,80
VROTAT,P51X, , , , , ,P51X, ,360, ,
SAVE,'latest_good4','db','B:\KPI\TERM6\ANSYSWORK\LAB4\'
LSTR,      27,      23
LFILLT,128,29,0.002, ,
APLOT
LPLOT
LSTR,      90,      23
FLST,2,3,4
FITEM,2,129
FITEM,2,130
FITEM,2,131
AL,P51X
SAVE
alist, all
APLOT
FLST,2,1,5,ORDE,1
FITEM,2,52
FLST,2,1,5,ORDE,1
FITEM,2,52
FLST,8,2,3
FITEM,8,79
FITEM,8,80
VROTAT,P51X, , , , , ,P51X, ,360, ,
SAVE
SAVE,'latest_good5','db','B:\KPI\TERM6\ANSYSWORK\LAB4\'
FLST,2,9,6,ORDE,2
FITEM,2,1
FITEM,2,-9
VADD,P51X
SAVE
FINISH
! /EXIT,ALL
