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/BATCH
/COM,ANSYS RELEASE 2022 R2           BUILD 22.2      UP20220516       19:13:43
/input,menust,tmp,''
/GST,ON
/PLO,INFO,3
/GRO,CURL,ON
/CPLANE,1
WPSTYLE,,,,,,,,0
/Units, Si
*AFUN,DEG
/NUMBER,0
SAVE
/SOLU
FINISH
/PREP7
CYLIND,0,0.05,0,0.03-0.02,0,360,
FLST,2,4,3,ORDE,2
FITEM,2,5
FITEM,2,-8
KWPAVE,P51X
RESUME
/COM,ANSYS RELEASE 2022 R2           BUILD 22.2      UP20220516       19:22:58
CYLIND,0,0.05/2,0,0.03-0.02,0,360,
FLST,2,2,3,ORDE,2
FITEM,2,5
FITEM,2,7
KWPAVE,P51X
CYLIND,0.035/2,0.05/2,0,0.02,0,360,
FLST,2,4,3,ORDE,2
FITEM,2,21
FITEM,2,-24
KWPAVE,P51X
CYLIND,0,0.05/2,0,0.05-0.03-0.01,0,360,
SAVE
SAVE,'good_1','db','B:\KPI\term6\AnsysWork\lab5\'
CSYS,0
WPAVE,0,0,0
CSYS,0
VDELE,       1, , ,1
CYLIND,0.02/2,0.05/2,0,0.01,0,360,
SAVE
SAVE,'good_1','db','B:\KPI\term6\AnsysWork\lab5\'
FLST,2,4,3,ORDE,2
FITEM,2,29
FITEM,2,-32
KWPAVE,P51X
CONE,0.05/2,0.035/2,0,0.01,0,360,
SAVE
WPCSYS,-1,0
CSYS,0
WPAVE,0,0,0
CSYS,0
wpro,,-30.000000,
wpro,,30.000000,
wpro,,30.000000,
wpro,,-30.000000,
wpro,,30.000000,
wpro,,-30.000000,
wpro,,30.000000,
wpro,,-30.000000,
wpro,,30.000000,
wpro,,-30.000000,
wpro,,30.000000,
wpro,,-30.000000,
wpro,,90.000000,
wpro,,-90.000000,
wpro,,90.000000,
wpro,,-90.000000,
wpro,,90.000000,
wpro,,-90.000000,
wpro,,90.000000,
SAVE
wpoff,0, 0.005, 0
SAVE
BLC5,0,0,0.02,0.01,0.05
RESUME
/COM,ANSYS RELEASE 2022 R2           BUILD 22.2      UP20220516       19:41:32
BLC5,0,0,0.02/2,0.01/2,0.05/2
RESUME
/COM,ANSYS RELEASE 2022 R2           BUILD 22.2      UP20220516       19:42:22
BLC5,0,0,0.02,0.01,0.05/2
SAVE,'good_2','db','B:\KPI\term6\AnsysWork\lab5\'
VSBV,       1,       5
SAVE,'good_2','db','B:\KPI\term6\AnsysWork\lab5\'
SAVE
wpoff,0, 0.015, 0
SAVE
BLC5,0,0,0.035,0.02,0.035/2
RESUME
/COM,ANSYS RELEASE 2022 R2           BUILD 22.2      UP20220516       19:50:27
BLC5,0,0,0.035,0.02,0.035
VSBV,       1,       2
RESUME
/COM,ANSYS RELEASE 2022 R2           BUILD 22.2      UP20220516       19:51:48
BLC5,0,0,0.035,0.020,0.035
SAVE
VSBV,       2,       1
SAVE
SAVE,'good_3','db','B:\KPI\term6\AnsysWork\lab5\'
FLST,2,4,3,ORDE,2
FITEM,2,45
FITEM,2,-48
KWPAVE,P51X
SAVE
WPCSYS,-1,0
FLST,2,4,3,ORDE,2
FITEM,2,45
FITEM,2,-48
KWPAVE,P51X
SAVE
BLC5,0,0,0.005,0.005,0.013
wpoff,0, -0.01, 0
SAVE
BLC5,0,0,0.005,0.03/2,0.04
SAVE
wpoff,0, -0.019, 0
RESUME
/COM,ANSYS RELEASE 2022 R2           BUILD 22.2      UP20220516       20:13:04
wpoff,0, -0.009, 0
SAVE
SAVE,'good_4','db','B:\KPI\term6\AnsysWork\lab5\'
wpro,-90.000000,,
wpro,90.000000,,
wpro,,,-90.000000
wpro,,,90.000000
wpro,,,90.000000
wpro,,,-90.000000
wpro,,,-90.000000
SAVE
wpoff,0, 0.0015, 0
SAVE
wpro,,,90.000000
BLC5,0,0,0.01,-0.003,0.04
SAVE
RESUME,'good_4','db','B:\KPI\term6\AnsysWork\lab5\',0,0
/COM,ANSYS RELEASE 2022 R2           BUILD 22.2      UP20220516       20:22:32
BLC5,0,0,0.01,-0.003,0.04
SAVE
LSTR,      16,      62
RESUME
/COM,ANSYS RELEASE 2022 R2           BUILD 22.2      UP20220516       20:24:03
LSTR,      21,      62
LSTR,      20,      61
LPLOT
VPLOT
SAVE
LPLOT
FLST,2,3,4
FITEM,2,64
FITEM,2,88
FITEM,2,102
AL,P51X
FLST,2,3,4
FITEM,2,101
FITEM,2,62
FITEM,2,87
AL,P51X
FLST,2,4,4
FITEM,2,22
FITEM,2,101
FITEM,2,86
FITEM,2,43
AL,P51X
FLST,2,4,4
FITEM,2,22
FITEM,2,101
FITEM,2,86
FITEM,2,43
AL,P51X
LSTR,      21,      63
LSTR,      20,      64
FLST,2,3,4
FITEM,2,103
FITEM,2,62
FITEM,2,101
AL,P51X
FLST,2,3,4
FITEM,2,104
FITEM,2,62
FITEM,2,102
AL,P51X
FLST,2,3,4
FITEM,2,104
FITEM,2,64
FITEM,2,102
AL,P51X
SAVE
FLST,8,3,4
FITEM,8,104
FITEM,8,102
FITEM,8,64
VDRAG,      44, , , , , ,P51X
VPLOT
APLOT
FLST,8,3,4
FITEM,8,102
FITEM,8,64
FITEM,8,104
VDRAG,      35, , , , , ,P51X
RESUME
/COM,ANSYS RELEASE 2022 R2           BUILD 22.2      UP20220516       20:35:24
APLOT
APLOT
ADELE,      44, , ,1
FLST,8,3,4
FITEM,8,11
FITEM,8,103
FITEM,8,63
VDRAG,      43, , , , , ,P51X
RESUME
/COM,ANSYS RELEASE 2022 R2           BUILD 22.2      UP20220516       20:37:10
APLOT
FLST,8,2,4
FITEM,8,11
FITEM,8,104
VDRAG,      43, , , , , ,P51X
RESUME
/COM,ANSYS RELEASE 2022 R2           BUILD 22.2      UP20220516       20:38:07
APLOT
ADELE,      44, , ,1
VDRAG,      43, , , , , ,      11
SAVE
VSBV,       2,       8
SAVE
SAVE,'good_5','db','B:\KPI\term6\AnsysWork\lab5\'
FLST,3,2,6,ORDE,2
FITEM,3,7
FITEM,3,9
VSYMM,X,P51X, , , ,0,0
RESUME
/COM,ANSYS RELEASE 2022 R2           BUILD 22.2      UP20220516       20:41:02
CSYS,0
WPAVE,0,0,0
CSYS,0
WPCSYS,-1,0
FLST,3,2,6,ORDE,2
FITEM,3,7
FITEM,3,9
VSYMM,X,P51X, , , ,0,0
RESUME
/COM,ANSYS RELEASE 2022 R2           BUILD 22.2      UP20220516       20:41:44
FLST,3,2,6,ORDE,2
FITEM,3,7
FITEM,3,9
VSYMM,Z,P51X, , , ,0,0
RESUME
/COM,ANSYS RELEASE 2022 R2           BUILD 22.2      UP20220516       20:42:10
FLST,3,2,6,ORDE,2
FITEM,3,7
FITEM,3,9
VSYMM,Y,P51X, , , ,0,0
SAVE
wpstyle,0.05,0.1,-1,1,0.003,1,2,,5
wpstyle,0.05,0.1,-1,1,0.003,0,2,,5
CSYS,4
wpstyle,0.05,0.1,-1,1,0.003,1,2,,5
CSYS,4
FLST,3,4,6,ORDE,3
FITEM,3,2
FITEM,3,7
FITEM,3,-9
VGEN,2,P51X, , , ,90, , ,0
RESUME
/COM,ANSYS RELEASE 2022 R2           BUILD 22.2      UP20220516       20:45:34
WPAVE,0,0,0
wpstyle,0.05,0.1,-1,1,0.003,1,2,,5
CSYS,4
FLST,3,4,6,ORDE,3
FITEM,3,2
FITEM,3,7
FITEM,3,-9
VGEN,2,P51X, , , ,90, , ,0
SAVE
SAVE,'good_6','db','B:\KPI\TERM6\ANSYSWORK\LAB5\'
wpstyle,0.05,0.1,-1,1,0.003,0,2,,5
WPSTYLE,,,,,,,,0
FLST,2,9,6,ORDE,4
FITEM,2,1
FITEM,2,-2
FITEM,2,7
FITEM,2,-13
VADD,P51X
SAVE
FLST,2,2,3,ORDE,2
FITEM,2,45
FITEM,2,47
KWPAVE,P51X
SAVE
TORUS,0,0.003,0.0205,0,360,
SAVE
VSBV,      14,       1
SAVE,'good_7','db','B:\KPI\TERM6\ANSYSWORK\LAB5\'
WPCSYS,-1,0
SAVE
wpro,,,90.000000
wpro,,,-90.000000
wpoff,0, -0.015, 0
wpro,,,90.000000
SAVE
CYLIND,0,0.005/2,0,0.07,0,360,
RESUME
/COM,ANSYS RELEASE 2022 R2           BUILD 22.2      UP20220516       21:01:59
wpoff,0.005, 0, 0
wpoff,-0.01, 0, 0
SAVE
CYL4,0,0,0.005/2, , , ,0.07
FLST,3,1,6,ORDE,1
FITEM,3,1
VGEN, ,P51X, , , , ,-0.035, , ,1
SAVE
VSBV,       6,       1
SAVE
FINISH
! /EXIT,ALL
