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/BATCH
/COM,ANSYS RELEASE 2022 R2           BUILD 22.2      UP20220516       22:14:16
/input,menust,tmp,''
/GST,ON
/PLO,INFO,3
/GRO,CURL,ON
/CPLANE,1
WPSTYLE,,,,,,,,0
/PREP7
FINISH
/SOL
/Units, Si
*AFUN,DEG
SAVE
FINISH
/PREP7
K, ,0,0,0,
K, ,0.03,0,0,
K, ,0.0345,0.003,0,
K, ,0.0285,0.007,0,
K, ,0.015,0.004,0,
LSTR,       1,       2
LSTR,       1,       5
FLST,3,4,3
FITEM,3,2
FITEM,3,3
FITEM,3,4
FITEM,3,5
BSPLIN, ,P51X
SAVE
SAVE,'save1','db','B:\KPI\term6\AnsysWork\lab6\'
FLST,3,3,4,ORDE,2
FITEM,3,1
FITEM,3,-3
LGEN,2,P51X, , , , ,0.15, ,1
/NUMBER,0
SAVE
SAVE,'save2','db','B:\KPI\term6\AnsysWork\lab6\'
FLST,2,3,4,ORDE,2
FITEM,2,4
FITEM,2,-6
FLST,2,3,4,ORDE,2
FITEM,2,4
FITEM,2,-6
LSSCALE,P51X, , ,1/2,1/2,1, ,1,1
SAVE
FLST,2,3,4
FITEM,2,1
FITEM,2,2
FITEM,2,3
AL,P51X
FLST,2,3,4
FITEM,2,4
FITEM,2,5
FITEM,2,6
AL,P51X
SAVE,'save3','db','B:\KPI\term6\AnsysWork\lab6\'
SAVE
FLST,2,2,4
FITEM,2,1
FITEM,2,4
ASKIN,P51X
APLOT
FLST,2,2,4
FITEM,2,2
FITEM,2,5
ASKIN,P51X
FLST,2,2,4
FITEM,2,3
FITEM,2,6
ASKIN,P51X
SAVE
SAVE,'save4','db','B:\KPI\term6\AnsysWork\lab6\'
FLST,2,5,5,ORDE,2
FITEM,2,1
FITEM,2,-5
VA,P51X
SAVE
wpoff,0, 0, 0.11
wpro,,,-30.000000
SAVE,'save5','db','B:\KPI\term6\AnsysWork\lab6\'
BOPTN,KEEP,0
BOPTN,NWARN,0
BOPTN,VERS,RV52
BTOL,1e-05,
VSBW,       1
SAVE
SAVE,'save6','db','B:\KPI\term6\AnsysWork\lab6\'
VDELE,       3, , ,1
WPCSYS,-1,0
SAVE
SAVE,'save7','db','B:\KPI\term6\AnsysWork\lab6\'
wpoff,0, 0, -0.015
wpro,-30.000000,,
wpro,30.000000,,
wpro,,,30.000000
wpro,,,-30.000000
wpro,,,90.000000
SAVE
SAVE,'save7','db','B:\KPI\term6\AnsysWork\lab6\'
CYLIND,0.035/2,0,0,0.065,90,270,
SAVE
SAVE,'save8','db','B:\KPI\term6\AnsysWork\lab6\'
CONE,0.015/2,0.035/2,-0.12,0,90,270,
SAVE
SAVE,'save9','db','B:\KPI\term6\AnsysWork\lab6\'
FLST,2,1,5,ORDE,1
FITEM,2,10
FLST,2,1,5,ORDE,1
FITEM,2,10
FLST,8,2,3
FITEM,8,14
FITEM,8,6
VROTAT,P51X, , , , , ,P51X, ,90,1,
RESUME
/COM,ANSYS RELEASE 2022 R2           BUILD 22.2      UP20220516       22:37:00
FLST,2,1,5,ORDE,1
FITEM,2,10
FLST,8,2,3
FITEM,8,14
FITEM,8,6
VROTAT,P51X, , , , , ,P51X, ,-90,1,
SAVE
FLST,2,1,5,ORDE,1
FITEM,2,5
FLST,8,2,3
FITEM,8,14
FITEM,8,6
VROTAT,P51X, , , , , ,P51X, ,90,1,
SAVE
SAVE
SAVE
FLST,2,1,5,ORDE,1
FITEM,2,15
FLST,8,2,3
FITEM,8,6
FITEM,8,15
VROTAT,P51X, , , , , ,P51X, ,-90,1,
FLST,2,1,5,ORDE,1
FITEM,2,14
FLST,8,2,3
FITEM,8,6
FITEM,8,15
VROTAT,P51X, , , , , ,P51X, ,90,1,
SAVE
SAVE
SAVE
FLST,2,6,6,ORDE,3
FITEM,2,1
FITEM,2,3
FITEM,2,-7
VADD,P51X
SAVE,'save10','db','B:\KPI\term6\AnsysWork\lab6\'
RESUME,'save8','db','B:\KPI\term6\AnsysWork\lab6\',0,0
/COM,ANSYS RELEASE 2022 R2           BUILD 22.2      UP20220516       00:04:10
RESUME,'save9','db','B:\KPI\term6\AnsysWork\lab6\',0,0
/COM,ANSYS RELEASE 2022 R2           BUILD 22.2      UP20220516       00:04:20
FLST,2,1,5,ORDE,1
FITEM,2,3
FLST,8,2,3
FITEM,8,12
FITEM,8,13
VROTAT,P51X, , , , , ,P51X, ,90,1,
RESUME,'save8','db','B:\KPI\term6\AnsysWork\lab6\',0,0
/COM,ANSYS RELEASE 2022 R2           BUILD 22.2      UP20220516       00:05:44
RESUME,'save9','db','B:\KPI\term6\AnsysWork\lab6\',0,0
/COM,ANSYS RELEASE 2022 R2           BUILD 22.2      UP20220516       00:05:48
FLST,2,1,5,ORDE,1
FITEM,2,3
FLST,8,2,3
FITEM,8,12
FITEM,8,13
VROTAT,P51X, , , , , ,P51X, ,-90,1,
FLST,2,1,5,ORDE,1
FITEM,2,11
FLST,8,2,3
FITEM,8,16
FITEM,8,17
VROTAT,P51X, , , , , ,P51X, ,90,1,
SAVE,'save10','db','B:\KPI\term6\AnsysWork\lab6\'
FLST,2,4,6,ORDE,3
FITEM,2,1
FITEM,2,3
FITEM,2,-5
VADD,P51X
DSYS,0
WPCSYS,-1,0
SAVE,'save11','db','B:\KPI\term6\AnsysWork\lab6\'
wpro,,,-90.000000
wpro,,,90.000000
wpro,,,90.000000
VSBW,       6
RESUME,'save11','db','B:\KPI\term6\AnsysWork\lab6\',0,0
/COM,ANSYS RELEASE 2022 R2           BUILD 22.2      UP20220516       00:14:21
VSBW,       6
VDELE,       1, , ,1
SAVE,'save12','db','B:\KPI\term6\AnsysWork\lab6\'
SAVE
wplane,-1,0,0,0,1,0,0,0,1,0
wplane,-1,0,0,0,1,0,0,0,1,0
wpstyle,0.05,0.01,-1,1,0.003,0,2,,5
wpstyle,0.05,0.01,-1,1,0.003,1,2,,5
wpstyle,0.05,0.001,-1,1,0.003,1,2,,5
wpstyle,0.05,0.001,-1,0.01,0.003,1,2,,5
wpstyle,0.05,0.001,-1,0.01,0.003,1,2,,5
WPSTYLE,,,,,,,,0
WPSTYLE,,,,,,,,1
WPSTYL, STAT
wpstyle,0.015,0.001,-1,0.01,0.003,1,2,,5
wpstyle,0.005,0.001,-1,0.01,0.003,1,2,,5
wpstyle,0.005,0.001,-1,0.01,0.003,1,2,,5
wpstyle,0.005,0.001,-1,0.01,0.003,1,2,,5
wpstyle,0.005,0.001,-1,0.01,0.003,1,2,,0.5
wpstyle,0.005,0.001,-1,0.01,0.003,1,2,,0.05
wpstyle,0.005,0.001,-1,0.01,0.003,0,2,,0.05
wpstyle,0.005,0.001,-1,0.01,0.003,0,2,,0.05
WPSTYLE,,,,,,,,0
WPSTYLE,,,,,,,,1
SAVE
KWPAVE,      15
SAVE
wpro,,-90.000000,
SAVE
BLC4,0,0,0.025,0.05,0.003
RESUME
/COM,ANSYS RELEASE 2022 R2           BUILD 22.2      UP20220516       00:22:32
wpro,,90.000000,
BLC4,0,0,0.025,0.05,0.003
SAVE
SAVE,'save13','db','B:\KPI\TERM6\ANSYSWORK\LAB6\'
FLST,2,2,6,ORDE,2
FITEM,2,1
FITEM,2,3
VADD,P51X
SAVE
KBETW,22,24,0,DIST,0.0125,
SAVE
KPLOT
LPLOT
L,      15,      31
L,      24,      15
FLST,2,3,4
FITEM,2,54
FITEM,2,19
FITEM,2,6
AL,P51X
APLOT
VDRAG,       2, , , , , ,      43
SAVE
SAVE,'save14','db','B:\KPI\TERM6\ANSYSWORK\LAB6\'
FLST,2,2,6,ORDE,2
FITEM,2,1
FITEM,2,4
VSBV,       4,       1
SAVE
SAVE,'save15','db','B:\KPI\TERM6\ANSYSWORK\LAB6\'
APLOT
LPLOT
FLST,2,4,4
FITEM,2,47
FITEM,2,57
FITEM,2,53
FITEM,2,58
AL,P51X
VPLOT
/LIG,   1,1, 1.000,   0.00000000000    ,   0.00000000000    ,   0.00000000000    ,   0.00000000000
RESUME
/COM,ANSYS RELEASE 2022 R2           BUILD 22.2      UP20220516       00:38:21
LPLOT
FLST,2,4,4
FITEM,2,47
FITEM,2,53
FITEM,2,57
FITEM,2,58
AL,P51X
RESUME
/COM,ANSYS RELEASE 2022 R2           BUILD 22.2      UP20220516       00:39:09
LPLOT
V,      31,      32,      16,      30
LPLOT
VPLOT
LPLOT
VPLOT
RESUME
/COM,ANSYS RELEASE 2022 R2           BUILD 22.2      UP20220516       00:44:57
LPLOT
FLST,2,4,4
FITEM,2,58
FITEM,2,57
FITEM,2,47
FITEM,2,53
AL,P51X
FLST,2,2,6,ORDE,2
FITEM,2,2
FITEM,2,-3
VSBA,P51X,       2
VPLOT
/LIG,   1,1, 1.000,   0.00000000000    ,   0.00000000000    ,   0.00000000000    ,   0.00000000000
/LIG,   1,1, 1.000,   0.00000000000    ,   0.00000000000    ,   0.00000000000    ,   0.00000000000
CSYS,4
SAVE
SAVE,'save16','db','B:\KPI\TERM6\ANSYSWORK\LAB6\'
CSYS,4
FLST,3,3,6,ORDE,3
FITEM,3,1
FITEM,3,-2
FITEM,3,4
VSYMM,Z,P51X, , , ,1,0
SAVE
SAVE,'save17','db','B:\KPI\TERM6\ANSYSWORK\LAB6\'
CSYS,0
FLST,2,2,6,ORDE,2
FITEM,2,4
FITEM,2,6
VADD,P51X
FLST,2,2,6,ORDE,2
FITEM,2,1
FITEM,2,3
VADD,P51X
SAVE
SAVE,'save18','db','B:\KPI\TERM6\ANSYSWORK\LAB6\'
FLST,2,2,6,ORDE,2
FITEM,2,4
FITEM,2,7
VGLUE,P51X
FLST,2,2,6,ORDE,2
FITEM,2,3
FITEM,2,5
VGLUE,P51X
FLST,2,2,6,ORDE,2
FITEM,2,2
FITEM,2,4
VGLUE,P51X
SAVE
SAVE
vlist, all
/NUMBER,0
FINISH
! /EXIT,ALL
