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/BATCH
/COM,ANSYS RELEASE 2022 R2           BUILD 22.2      UP20220516       00:10:06
/input,menust,tmp,''
/GST,ON
/PLO,INFO,3
/GRO,CURL,ON
/CPLANE,1
WPSTYLE,,,,,,,,0
/Units, Si
*AFUN,DEG
/NOPR
KEYW,PR_SET,1
KEYW,PR_STRUC,1
KEYW,PR_THERM,0
KEYW,PR_FLUID,0
KEYW,PR_ELMAG,0
KEYW,MAGNOD,0
KEYW,MAGEDG,0
KEYW,MAGHFE,0
KEYW,MAGELC,0
KEYW,PR_MULTI,0
/GO
/COM,
/COM,Preferences for GUI filtering have been set to display:
/COM,  Structural
/PREP7
ET,1,BEAM189
ET,2,   3 node    3
ETDEL,2
KEYOPT, 1, 9, 9
ETDEL,1
ET,1,3
KEYOPT,1,9,9
R,1, 0.0029, 2.03e-5, 0.2
MPTEMP,,,,,,,,
MPTEMP,1,0
MPDATA,EX,1,,2e11
MPDATA,PRXY,1,,0.3
MPTEMP,,,,,,,,
MPTEMP,1,0
MPDATA,DENS,1,,7800
SAVE
N,1,0,0,0,,,,
N,1,1,0,0,,,,
N,1,0,0,0,,,,
N,2,1,0,0,,,,
N,3,1.5,0,0,,,,
N,4,2,0,0,,,,
FLST,2,4,1
FITEM,2,1
FITEM,2,2
FITEM,2,3
FITEM,2,4
E,P51X
FLST,2,2,1
FITEM,2,2
FITEM,2,3
E,P51X
FLST,2,2,1
FITEM,2,3
FITEM,2,4
E,P51X
RESUME
/COM,ANSYS RELEASE 2022 R2           BUILD 22.2      UP20220516       00:32:18
N,1,0,0,0,,,,
N,2,1,0,0,,,,
N,3,1.5,0,0,,,,
N,4,2,0,0,,,,
SAVE
FLST,2,2,1
FITEM,2,1
FITEM,2,2
E,P51X
FLST,2,2,1
FITEM,2,2
FITEM,2,3
E,P51X
FLST,2,2,1
FITEM,2,3
FITEM,2,4
E,P51X
LPLOT
NPLOT
EPLOT
/NUMBER,0
/NUMBER,0
/NUMBER,0
SAVE
/SHRINK,0
/ESHAPE,1.0
/EFACET,1
/RATIO,1,1,1
/CFORMAT,32,0
EPLOT
SAVE
FINISH
/SOL
FINISH
/PREP7
ANTYPE,0
FLST,2,1,1,ORDE,1
FITEM,2,1
/GO
D,P51X,UY,0, , , , , , , , ,
FLST,2,1,1,ORDE,1
FITEM,2,4
/GO
D,P51X,UX,0, , , ,UY,ROTZ, , , ,
SAVE,'save1','db','B:\KPI\term6\AnsysWork\lab7\'
FLST,2,1,2,ORDE,1
FITEM,2,1
SFBEAM,P51X,1,PRES,10000,10000, , , , ,0
FLST,2,1,2,ORDE,1
FITEM,2,2
SAVE,'save2','db','B:\KPI\term6\AnsysWork\lab7\'
FLST,2,1,1,ORDE,1
FITEM,2,2
/GO
F,P51X,MZ,-10000
FLST,2,1,1,ORDE,1
FITEM,2,3
/GO
F,P51X,FY,15000
SAVE,'save3','db','B:\KPI\term6\AnsysWork\lab7\'
FINISH
/SOL
ACEL,0,9.8,0,
/STATUS,SOLU
SOLVE
FINISH
/POST1
PRRSOL,
SAVE,'save4','db','B:\KPI\term6\AnsysWork\lab7\'
/PSF,DEFA, ,1,0,1
/PBF,DEFA, ,1
/PSYMB,CS,0
/PSYMB,NDIR,0
/PSYMB,ESYS,0
/PSYMB,LDIV,0
/PSYMB,LDIR,0
/PSYMB,ADIR,0
/PSYMB,ECON,0
/PSYMB,XNODE,0
/PSYMB,DOT,1
/PSYMB,PCONV,
/PSYMB,LAYR,0
/PSYMB,FBCS,0
/PBC,ALL, ,1
/EFACET,1
PLNSOL, U,SUM, 1,1.0
SAVE,'save5','db','B:\KPI\term6\AnsysWork\lab7\'
AVPRIN,0, ,
ETABLE,Qyi,SMISC, 2
AVPRIN,0, ,
ETABLE,Qyi,SMISC, 2
AVPRIN,0, ,
ETABLE,Qyi,SMISC, 2
RESUME,'save5','db','B:\KPI\term6\AnsysWork\lab7\',0,0
/COM,ANSYS RELEASE 2022 R2           BUILD 22.2      UP20220516       00:56:20
RESUME,'save5','db','B:\KPI\term6\AnsysWork\lab7\',0,0
/COM,ANSYS RELEASE 2022 R2           BUILD 22.2      UP20220516       00:56:27
FINISH
/SOL
FINISH
/POST1
FINISH
/SOL
/STATUS,SOLU
ACEL,0,9.8,0,
/STATUS,SOLU
SOLVE
FINISH
/PREP7
FINISH
/POST1
PRRSOL,
/PSF,DEFA, ,1,0,1
/PBF,DEFA, ,1
/PSYMB,CS,0
/PSYMB,NDIR,0
/PSYMB,ESYS,0
/PSYMB,LDIV,0
/PSYMB,LDIR,0
/PSYMB,ADIR,0
/PSYMB,ECON,0
/PSYMB,XNODE,0
/PSYMB,DOT,1
/PSYMB,PCONV,
/PSYMB,LAYR,0
/PSYMB,FBCS,0
/PBC,ALL, ,1
/EFACET,1
PLNSOL, U,SUM, 1,1.0
SAVE,'save6','db','B:\KPI\term6\AnsysWork\lab7\'
AVPRIN,0, ,
ETABLE,Qyi,SMISC, 2
FINISH
/SOL
FINISH
/PREP7
FINISH
/SOL
FINISH
/PREP7
KEYOPT, 1, 9, 9
FINISH
/POST1
AVPRIN,0, ,
ETABLE,Qyi,SMISC, 2
AVPRIN,0, ,
ETABLE,Qyj,SMISC, 62
AVPRIN,0, ,
ETABLE,Mzi,SMISC, 6
AVPRIN,0, ,
ETABLE,Mzj,SMISC, 66
AVPRIN,0, ,
ETABLE,Szi,LS, 2
AVPRIN,0, ,
ETABLE,Szj,LS, 32
RESUME,'save6','db','B:\KPI\term6\AnsysWork\lab7\',0,0
/COM,ANSYS RELEASE 2022 R2           BUILD 22.2      UP20220516       01:07:15
RESUME,'save6','db','B:\KPI\term6\AnsysWork\lab7\',0,0
/COM,ANSYS RELEASE 2022 R2           BUILD 22.2      UP20220516       01:07:25
RESUME,'save5','db','B:\KPI\term6\AnsysWork\lab7\',0,0
/COM,ANSYS RELEASE 2022 R2           BUILD 22.2      UP20220516       01:07:32
RESUME,'save5','db','B:\KPI\term6\AnsysWork\lab7\',0,0
/COM,ANSYS RELEASE 2022 R2           BUILD 22.2      UP20220516       01:07:42
/EFACET,1
PLNSOL, U,SUM, 1,1.0
SAVE
RESUME
/COM,ANSYS RELEASE 2022 R2           BUILD 22.2      UP20220516       01:09:16
FINISH
/CLEAR,NOSTART
/COM,ANSYS RELEASE 2022 R2           BUILD 22.2      UP20220516       01:09:40
/UNITS, Si
*AFUN,DEG
/NOPR
KEYW,PR_SET,1
KEYW,PR_STRUC,1
KEYW,PR_THERM,0
KEYW,PR_FLUID,0
KEYW,PR_ELMAG,0
KEYW,MAGNOD,0
KEYW,MAGEDG,0
KEYW,MAGHFE,0
KEYW,MAGELC,0
KEYW,PR_MULTI,0
/GO
/COM,
/COM,Preferences for GUI filtering have been set to display:
/COM,  Structural
/PREP7
ET,1,3
KEYOPT,1,9,9
R,1,2.9e-3,2.03e-5,0.2
SAVE
N,1,0,0,0,,,,
N,2,1,0,0,,,,
N,3,1.5,0,0,,,,
N,4,2,0,0,,,,
FLST,2,2,1
FITEM,2,1
FITEM,2,2
E,P51X
FLST,2,2,1
FITEM,2,2
FITEM,2,3
E,P51X
FLST,2,2,1
FITEM,2,3
FITEM,2,4
E,P51X
/NUMBER,0
/NUMBER,0
NPLOT
EPLOT
SAVE
/SHRINK,0
/ESHAPE,1.0
/EFACET,1
/RATIO,1,1,1
/CFORMAT,32,0
EPLOT
SAVE
FINISH
/SOL
FINISH
/PREP7
ANTYPE,0
FLST,2,1,1,ORDE,1
FITEM,2,1
/GO
D,P51X,UY,0, , , , , , , , ,
FLST,2,1,1,ORDE,1
FITEM,2,4
/GO
D,P51X,UX,0, , , ,UY,ROTZ, , , ,
SAVE
FLST,2,1,2,ORDE,1
FITEM,2,1
SFBEAM,P51X,1,PRES,10000,10000, , , , ,0
FLST,2,1,1,ORDE,1
FITEM,2,2
/GO
F,P51X,MZ,-10000
FLST,2,1,1,ORDE,1
FITEM,2,3
/GO
F,P51X,FY,15000
SAVE
FINISH
/SOL
ACEL,0,9.8,0,
SAVE
/STATUS,SOLU
SOLVE
/STATUS,SOLU
SOLVE
FINISH
/PREP7
MPTEMP,,,,,,,,
MPTEMP,1,0
MPDATA,EX,1,,2e11
MPDATA,PRXY,1,,0.3
MPTEMP,,,,,,,,
MPTEMP,1,0
MPDATA,DENS,1,,7800
SAVE
FINISH
/POST1
FINISH
/SOL
/STATUS,SOLU
SOLVE
FINISH
/POST1
PRRSOL,
/PSF,DEFA, ,1,0,1
/PBF,DEFA, ,1
/PSYMB,CS,0
/PSYMB,NDIR,0
/PSYMB,ESYS,0
/PSYMB,LDIV,0
/PSYMB,LDIR,0
/PSYMB,ADIR,0
/PSYMB,ECON,0
/PSYMB,XNODE,0
/PSYMB,DOT,1
/PSYMB,PCONV,
/PSYMB,LAYR,0
/PSYMB,FBCS,0
/PBC,ALL, ,1
/EFACET,1
PLNSOL, U,SUM, 1,1.0
SAVE
AVPRIN,0, ,
ETABLE,Qyi,SMISC, 2
RESUME,'save5','db','B:\KPI\term6\AnsysWork\lab7\',0,0
/COM,ANSYS RELEASE 2022 R2           BUILD 22.2      UP20220516       01:25:43
/EFACET,1
PLNSOL, U,SUM, 1,1.0
FINISH
! /EXIT,ALL
/BATCH
/COM,ANSYS RELEASE 2022 R2           BUILD 22.2      UP20220516       01:31:07
/input,menust,tmp,''
/GST,ON
/PLO,INFO,3
/GRO,CURL,ON
/CPLANE,1
WPSTYLE,,,,,,,,0
/NUMBER,0
EPLOT
NPLOT
EPLOT
RESUME,'LabWork7frm','db','B:\KPI\term6\AnsysWork\lab7\',0,0
/COM,ANSYS RELEASE 2022 R2           BUILD 22.2      UP20220516       01:31:51
/SOLU
FINISH
/POST1
/EFACET,1
PLNSOL, U,SUM, 1,1.0
FINISH
/SOL
FINISH
/POST1
AVPRIN,0, ,
ETABLE,QYI,SMISC, 2
FINISH
! /EXIT,NOSAV
/BATCH
/COM,ANSYS RELEASE 2022 R2           BUILD 22.2      UP20220516       08:56:13
/input,menust,tmp,''
/GST,ON
/PLO,INFO,3
/GRO,CURL,ON
/CPLANE,1
WPSTYLE,,,,,,,,0
RESUME,'save5','db','B:\KPI\term6\AnsysWork\lab7\',0,0
/COM,ANSYS RELEASE 2022 R2           BUILD 22.2      UP20220516       08:56:41
/POST1
/EFACET,1
PLNSOL, U,SUM, 1,1.0
! KEYOPT, 1, 9, 9
! KEYOPT,1,9,9
RESUME,'save5','db','B:\KPI\term6\AnsysWork\lab7\',0,0
/COM,ANSYS RELEASE 2022 R2           BUILD 22.2      UP20220516       09:02:17
! KEYOPT,1,9,9
FINISH
/PREP7
KEYOPT,1,9,9
FINISH
/SOL
ANTYPE,0
/STATUS,SOLU
SOLVE
FINISH
/POST1
PRRSOL,
SET,LAST
AVPRIN,0, ,
ETABLE,Qyi,SMISC, 2
AVPRIN,0, ,
ETABLE,Mzi,SMISC, 6
AVPRIN,0, ,
ETABLE,Mzj,SMISC, 66
AVPRIN,0, ,
ETABLE,Qyj,SMISC, 62
AVPRIN,0, ,
ETABLE,Szi,LS, 2
AVPRIN,0, ,
ETABLE,Szj,LS, 32
/EFACET,1
PLNSOL, U,SUM, 1,1.0
/PSF,DEFA, ,1,0,1
/PBF,DEFA, ,1
/PSYMB,CS,0
/PSYMB,NDIR,0
/PSYMB,ESYS,0
/PSYMB,LDIV,0
/PSYMB,LDIR,0
/PSYMB,ADIR,0
/PSYMB,ECON,0
/PSYMB,XNODE,0
/PSYMB,DOT,1
/PSYMB,PCONV,
/PSYMB,LAYR,0
/PSYMB,FBCS,0
/PBC,ALL, ,1
PLLS,QYI,QYJ,3,0,0
PLLS,MZI,MZJ,3,0,0
PLLS,SZI,SZJ,3,0,0
SAVE,'save6','db','B:\KPI\term6\AnsysWork\lab7\'
PLLS,QYI,QYJ,3,0,0
PLLS,SZI,SZJ,3,0,0
FINISH
! /EXIT,ALL
