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/BATCH
/COM,ANSYS RELEASE 2022 R2           BUILD 22.2      UP20220516       22:44:49
/input,menust,tmp,''
/GST,ON
/PLO,INFO,3
/GRO,CURL,ON
/CPLANE,1
WPSTYLE,,,,,,,,0
RESUME,'LabWork3frm','db','B:\KPI\term6\AnsysWork\lab8\',0,0
/COM,ANSYS RELEASE 2022 R2           BUILD 22.2      UP20220516       22:47:03
RESUME,'LabWork3frm','dbb','B:\KPI\term6\AnsysWork\lab8\',0,0
/COM,ANSYS RELEASE 2022 R2           BUILD 22.2      UP20220516       22:47:35
RESUME,'LabWork3frm','db','B:\KPI\term6\AnsysWork\lab8\',0,0
/COM,ANSYS RELEASE 2022 R2           BUILD 22.2      UP20220516       22:51:29
/PREP7
FINISH
/SOL
FINISH
/PREP7
FLST,2,2,5,ORDE,2
FITEM,2,1
FITEM,2,4
AADD,P51X
FLST,2,1,5,ORDE,1
FITEM,2,2
FLST,2,1,5,ORDE,1
FITEM,2,2
VEXT,P51X, , ,0,0.005,0,,,,
FLST,2,1,5,ORDE,1
FITEM,2,2
VEXT,P51X, , ,0,0,0.005,,,,
SAVE,'LabWork3frm','db','B:\KPI\term6\AnsysWork\lab8\'
/Units, Si
*AFUN,DEG
/NOPR
KEYW,PR_SET,1
KEYW,PR_STRUC,1
KEYW,PR_THERM,0
KEYW,PR_FLUID,0
KEYW,PR_ELMAG,0
KEYW,MAGNOD,0
KEYW,MAGEDG,0
KEYW,MAGHFE,0
KEYW,MAGELC,0
KEYW,PR_MULTI,0
/GO
/COM,
/COM,Preferences for GUI filtering have been set to display:
/COM,  Structural
SAVE,'save1','db','B:\KPI\term6\AnsysWork\lab8\'
ET,1,PLANE183
ETDEL,1
ET,1,PLANE183
KEYOPT,1,1,0
KEYOPT,1,3,0
KEYOPT,1,6,0
KEYOPT,1,1,0
KEYOPT,1,3,0
KEYOPT,1,6,0
alist, all
LLIST,ALL, , ,
SAVE,'save2','db','B:\KPI\term6\AnsysWork\lab8\'
FLST,3,28,5,ORDE,2
FITEM,3,1
FITEM,3,-28
FLST,2,28,5,ORDE,2
FITEM,2,1
FITEM,2,-28
AADD,P51X
RESUME,'save2','db','B:\KPI\term6\AnsysWork\lab8\',0,0
/COM,ANSYS RELEASE 2022 R2           BUILD 22.2      UP20220516       23:13:41
KEYOPT, 1,1, Quadriteral
KEYOPT, 1, 3, 3
R,1,0.005,
SAVE,'save3','db','B:\KPI\term6\AnsysWork\lab8\'
MPTEMP,,,,,,,,
MPTEMP,1,0
MPDATA,EX,1,,2.05e+11
MPDATA,PRXY,1,,0.27
MPTEMP,,,,,,,,
MPTEMP,1,0
MPDE,EX,1
MPDE,PRXY,1
MPDATA,EX,1,,2.05E+11
MPDATA,PRXY,1,,0.27
MPTEMP,,,,,,,,
MPTEMP,1,0
MPDATA,DENS,1,,7800
SAVE,'save4','db','B:\KPI\TERM6\ANSYSWORK\LAB8\'
ESIZE,0.005,0,
MSHKEY,0
FLST,5,28,5,ORDE,2
FITEM,5,1
FITEM,5,-28
CM,_Y,AREA
ASEL, , , ,P51X
CM,_Y1,AREA
CHKMSH,'AREA'
CMSEL,S,_Y
! AMESH,_Y1
CMDELE,_Y
CMDELE,_Y1
CMDELE,_Y2
RESUME,'save4','db','B:\KPI\TERM6\ANSYSWORK\LAB8\',0,0
/COM,ANSYS RELEASE 2022 R2           BUILD 22.2      UP20220516       23:36:33
MSHKEY,0
FLST,5,2,5,ORDE,2
FITEM,5,1
FITEM,5,-2
CM,_Y,AREA
ASEL, , , ,P51X
CM,_Y1,AREA
CHKMSH,'AREA'
CMSEL,S,_Y
AMESH,_Y1
CMDELE,_Y
CMDELE,_Y1
CMDELE,_Y2
RESUME,'save4','db','B:\KPI\TERM6\ANSYSWORK\LAB8\',0,0
/COM,ANSYS RELEASE 2022 R2           BUILD 22.2      UP20220516       23:37:47
MSHKEY,0
CM,_Y,AREA
ASEL, , , ,       1
CM,_Y1,AREA
CHKMSH,'AREA'
CMSEL,S,_Y
AMESH,_Y1
CMDELE,_Y
CMDELE,_Y1
CMDELE,_Y2
RESUME,'save4','db','B:\KPI\TERM6\ANSYSWORK\LAB8\',0,0
/COM,ANSYS RELEASE 2022 R2           BUILD 22.2      UP20220516       23:38:42
MSHKEY,0
FLST,5,28,5,ORDE,2
FITEM,5,1
FITEM,5,-28
CM,_Y,AREA
ASEL, , , ,P51X
CM,_Y1,AREA
CHKMSH,'AREA'
CMSEL,S,_Y
AMESH,_Y1
CMDELE,_Y
CMDELE,_Y1
CMDELE,_Y2
FINISH
/SOL
FINISH
/PREP7
FLST,2,28,5,ORDE,2
FITEM,2,1
FITEM,2,-28
AADD,P51X
RESUME,'save4','db','B:\KPI\TERM6\ANSYSWORK\LAB8\',0,0
/COM,ANSYS RELEASE 2022 R2           BUILD 22.2      UP20220516       23:41:10
FLST,2,28,5,ORDE,2
FITEM,2,1
FITEM,2,-28
AADD,P51X
FINISH
/SOL
FINISH
/PREP7
FLST,2,64,3,ORDE,2
FITEM,2,1
FITEM,2,-64
KDELE,P51X
APLOT
VPLOT
APLOT
FLST,2,28,5,ORDE,2
FITEM,2,1
FITEM,2,-28
ADELE,P51X
LPLOT
APLOT
VPLOT
FLST,3,1,6,ORDE,1
FITEM,3,1
FLST,2,28,5,ORDE,2
FITEM,2,1
FITEM,2,-28
AINA,P51X
RESUME,'save4','db','B:\KPI\TERM6\ANSYSWORK\LAB8\',0,0
/COM,ANSYS RELEASE 2022 R2           BUILD 22.2      UP20220516       23:43:06
FINISH
/SOL
FINISH
/PREP7
MSHKEY,0
MSHAPE,1,3d
CM,_Y,VOLU
VSEL, , , ,       1
CM,_Y1,VOLU
CHKMSH,'VOLU'
CMSEL,S,_Y
VMESH,_Y1
CMDELE,_Y
CMDELE,_Y1
CMDELE,_Y2
MSHKEY,0
MSHAPE,1,3d
CM,_Y,VOLU
VSEL, , , ,       1
CM,_Y1,VOLU
CHKMSH,'VOLU'
CMSEL,S,_Y
VMESH,_Y1
CMDELE,_Y
CMDELE,_Y1
CMDELE,_Y2
FLST,5,28,5,ORDE,2
FITEM,5,1
FITEM,5,-28
CM,_Y,AREA
ASEL, , , ,P51X
CM,_Y1,AREA
CHKMSH,'AREA'
CMSEL,S,_Y
MSHKEY,1
AMESH,_Y1
MSHKEY,0
CMDELE,_Y
CMDELE,_Y1
CMDELE,_Y2
MSHKEY,0
FLST,5,28,5,ORDE,2
FITEM,5,1
FITEM,5,-28
CM,_Y,AREA
ASEL, , , ,P51X
CM,_Y1,AREA
CHKMSH,'AREA'
CMSEL,S,_Y
! AMESH,_Y1
CMDELE,_Y
CMDELE,_Y1
CMDELE,_Y2
RESUME,'save4','db','B:\KPI\TERM6\ANSYSWORK\LAB8\',0,0
/COM,ANSYS RELEASE 2022 R2           BUILD 22.2      UP20220516       23:45:13
MSHKEY,0
FLST,5,26,5,ORDE,2
FITEM,5,3
FITEM,5,-28
CM,_Y,AREA
ASEL, , , ,P51X
CM,_Y1,AREA
CHKMSH,'AREA'
CMSEL,S,_Y
! AMESH,_Y1
CMDELE,_Y
CMDELE,_Y1
CMDELE,_Y2
RESUME,'save4','db','B:\KPI\TERM6\ANSYSWORK\LAB8\',0,0
/COM,ANSYS RELEASE 2022 R2           BUILD 22.2      UP20220516       23:46:03
MSHKEY,0
MSHAPE,1,3d
CM,_Y,VOLU
VSEL, , , ,       1
CM,_Y1,VOLU
CHKMSH,'VOLU'
CMSEL,S,_Y
VMESH,_Y1
CMDELE,_Y
CMDELE,_Y1
CMDELE,_Y2
FLST,2,89,4,ORDE,2
FITEM,2,1
FITEM,2,-89
LMESH,P51X
FLST,2,28,5,ORDE,2
FITEM,2,1
FITEM,2,-28
AGLUE,P51X
MSHKEY,0
FLST,5,28,5,ORDE,2
FITEM,5,1
FITEM,5,-28
CM,_Y,AREA
ASEL, , , ,P51X
CM,_Y1,AREA
CHKMSH,'AREA'
CMSEL,S,_Y
AMESH,_Y1
CMDELE,_Y
CMDELE,_Y1
CMDELE,_Y2
RESUME,'save4','db','B:\KPI\TERM6\ANSYSWORK\LAB8\',0,0
/COM,ANSYS RELEASE 2022 R2           BUILD 22.2      UP20220516       23:49:34
APLOT
alist, all
AMESH, 1, 28, 0.0025
RESUME,'save4','db','B:\KPI\TERM6\ANSYSWORK\LAB8\',0,0
/COM,ANSYS RELEASE 2022 R2           BUILD 22.2      UP20220516       23:52:14
ESIZE,0.0025,0,
MSHKEY,0
FLST,5,28,5,ORDE,2
FITEM,5,1
FITEM,5,-28
CM,_Y,AREA
ASEL, , , ,P51X
CM,_Y1,AREA
CHKMSH,'AREA'
CMSEL,S,_Y
AMESH,_Y1
CMDELE,_Y
CMDELE,_Y1
CMDELE,_Y2
RESUME,'save4','db','B:\KPI\TERM6\ANSYSWORK\LAB8\',0,0
/COM,ANSYS RELEASE 2022 R2           BUILD 22.2      UP20220516       23:55:05
wpro,,90.000000,
MSHKEY,0
FLST,5,28,5,ORDE,2
FITEM,5,1
FITEM,5,-28
CM,_Y,AREA
ASEL, , , ,P51X
CM,_Y1,AREA
CHKMSH,'AREA'
CMSEL,S,_Y
AMESH,_Y1
CMDELE,_Y
CMDELE,_Y1
CMDELE,_Y2
RESUME,'save4','db','B:\KPI\TERM6\ANSYSWORK\LAB8\',0,0
/COM,ANSYS RELEASE 2022 R2           BUILD 22.2      UP20220516       23:57:11
MSHKEY,0
CM,_Y,AREA
ASEL, , , ,       1
CM,_Y1,AREA
CHKMSH,'AREA'
CMSEL,S,_Y
AMESH,_Y1
CMDELE,_Y
CMDELE,_Y1
CMDELE,_Y2
/NUMBER,0
/SHRINK,0
/ESHAPE,1.0
/EFACET,1
/RATIO,1,1,1
/CFORMAT,32,0
SAVE,'save5','db','B:\KPI\TERM6\ANSYSWORK\LAB8\'
FINISH
/SOL
FINISH
/PREP7
ANTYPE,0
SAVE,'save6','db','B:\KPI\TERM6\ANSYSWORK\LAB8\'
FINISH
/SOL
FLST,2,4,4,ORDE,4
FITEM,2,9
FITEM,2,29
FITEM,2,-30
FITEM,2,46
/GO
DL,P51X, ,ALL,
LPLOT
SAVE,'save7','db','B:\KPI\TERM6\ANSYSWORK\LAB8\'
APLOT
FLST,2,4,4,ORDE,2
FITEM,2,40
FITEM,2,-43
/GO
SFL,P51X,PRES,62830000,0
SAVE,'save8','db','B:\KPI\TERM6\ANSYSWORK\LAB8\'
RESUME,'save7','db','B:\KPI\TERM6\ANSYSWORK\LAB8\',0,0
/COM,ANSYS RELEASE 2022 R2           BUILD 22.2      UP20220516       00:13:45
LPLOT
APLOT
/LIG,   1,1, 1.000,   0.00000000000    ,   0.00000000000    ,   0.00000000000    ,   0.00000000000
FLST,2,8,4,ORDE,4
FITEM,2,19
FITEM,2,-22
FITEM,2,40
FITEM,2,-43
/GO
SFL,P51X,PRES,62830000,0
/PSF,PRES,NORM,2,0,1
/PBF,DEFA, ,1
/PSYMB,CS,0
/PSYMB,NDIR,0
/PSYMB,ESYS,0
/PSYMB,LDIV,0
/PSYMB,LDIR,0
/PSYMB,ADIR,0
/PSYMB,ECON,0
/PSYMB,XNODE,0
/PSYMB,DOT,1
/PSYMB,PCONV,
/PSYMB,LAYR,0
/PSYMB,FBCS,0
/PBC,ALL,,1
/PBC,NFOR,,0
/PBC,NMOM,,0
/PBC,RFOR,,0
/PBC,RMOM,,0
/PBC,PATH,,0
NPLOT
EPLOT
VPLOT
APLOT
LPLOT
LPLOT
RESUME
/COM,ANSYS RELEASE 2022 R2           BUILD 22.2      UP20220516       00:18:01
APLOT
VPLOT
RESUME,'save8','db','B:\KPI\TERM6\ANSYSWORK\LAB8\',0,0
/COM,ANSYS RELEASE 2022 R2           BUILD 22.2      UP20220516       00:18:15
VPLOT
RESUME,'save7','db','B:\KPI\TERM6\ANSYSWORK\LAB8\',0,0
/COM,ANSYS RELEASE 2022 R2           BUILD 22.2      UP20220516       00:18:27
FLST,2,9,4,ORDE,5
FITEM,2,19
FITEM,2,-22
FITEM,2,40
FITEM,2,-43
FITEM,2,81
/GO
FLST,2,4,4,ORDE,4
FITEM,2,19
FITEM,2,22
FITEM,2,41
FITEM,2,-42
/GO
FLST,2,4,4,ORDE,4
FITEM,2,19
FITEM,2,22
FITEM,2,41
FITEM,2,-42
/GO
SFL,P51X,PRES,62830000,0
/PSF,PRES,NORM,2,0,1
/PBF,DEFA, ,1
/PSYMB,CS,0
/PSYMB,NDIR,0
/PSYMB,ESYS,0
/PSYMB,LDIV,0
/PSYMB,LDIR,0
/PSYMB,ADIR,0
/PSYMB,ECON,0
/PSYMB,XNODE,0
/PSYMB,DOT,1
/PSYMB,PCONV,
/PSYMB,LAYR,0
/PSYMB,FBCS,0
/PBC,ALL,,1
/PBC,NFOR,,0
/PBC,NMOM,,0
/PBC,RFOR,,0
/PBC,RMOM,,0
/PBC,PATH,,0
/PSF,PRES,NORM,2,0,1
/PBF,DEFA, ,1
/PSYMB,CS,0
/PSYMB,NDIR,0
/PSYMB,ESYS,0
/PSYMB,LDIV,0
/PSYMB,LDIR,0
/PSYMB,ADIR,0
/PSYMB,ECON,0
/PSYMB,XNODE,0
/PSYMB,DOT,1
/PSYMB,PCONV,
/PSYMB,LAYR,0
/PSYMB,FBCS,0
/PBC,ALL,,1
/PBC,NFOR,,0
/PBC,NMOM,,0
/PBC,RFOR,,0
/PBC,RMOM,,0
/PBC,PATH,,0
/STATUS,SOLU
SOLVE
/BATCH
/COM,ANSYS RELEASE 2022 R2           BUILD 22.2      UP20220516       00:28:23
/input,menust,tmp,''
/GST,ON
/PLO,INFO,3
/GRO,CURL,ON
/CPLANE,1
WPSTYLE,,,,,,,,0
RESUME,'save7','db','B:\KPI\term6\AnsysWork\lab8\',0,0
/COM,ANSYS RELEASE 2022 R2           BUILD 22.2      UP20220516       00:28:29
/SOLU
FLST,2,2,4,ORDE,2
FITEM,2,41
FITEM,2,-42
/GO
SFL,P51X,PRES,98685.714,0
FLST,2,2,4,ORDE,2
FITEM,2,19
FITEM,2,22
/GO
SFL,P51X,PRES,98685.714,0
/PSF,PRES,NORM,2,0,1
/PBF,DEFA, ,1
/PSYMB,CS,0
/PSYMB,NDIR,0
/PSYMB,ESYS,0
/PSYMB,LDIV,0
/PSYMB,LDIR,0
/PSYMB,ADIR,0
/PSYMB,ECON,0
/PSYMB,XNODE,0
/PSYMB,DOT,1
/PSYMB,PCONV,
/PSYMB,LAYR,0
/PSYMB,FBCS,0
/PBC,ALL,,1
/PBC,NFOR,,0
/PBC,NMOM,,0
/PBC,RFOR,,0
/PBC,RMOM,,0
/PBC,PATH,,0
APLOT
SAVE,'save8','db','B:\KPI\term6\AnsysWork\lab8\'
/STATUS,SOLU
SOLVE
/BATCH
/COM,ANSYS RELEASE 2022 R2           BUILD 22.2      UP20220516       00:41:11
/input,menust,tmp,''
/GST,ON
/PLO,INFO,3
/GRO,CURL,ON
/CPLANE,1
WPSTYLE,,,,,,,,0
RESUME,'save8','db','B:\KPI\term6\AnsysWork\lab8\',0,0
/COM,ANSYS RELEASE 2022 R2           BUILD 22.2      UP20220516       00:41:29
/SOLU
APLOT
/PSF,PRES,NORM,2,0,1
/PBF,DEFA, ,1
/PSYMB,CS,0
/PSYMB,NDIR,0
/PSYMB,ESYS,0
/PSYMB,LDIV,0
/PSYMB,LDIR,0
/PSYMB,ADIR,0
/PSYMB,ECON,0
/PSYMB,XNODE,0
/PSYMB,DOT,1
/PSYMB,PCONV,
/PSYMB,LAYR,0
/PSYMB,FBCS,0
/PBC,ALL,,1
/PBC,NFOR,,0
/PBC,NMOM,,0
/PBC,RFOR,,0
/PBC,RMOM,,0
/PBC,PATH,,0
/STATUS,SOLU
! SOLVE
/STATUS,SOLU
SOLVE
/BATCH
/COM,ANSYS RELEASE 2022 R2           BUILD 22.2      UP20220516       00:45:28
/input,menust,tmp,''
/GST,ON
/PLO,INFO,3
/GRO,CURL,ON
/CPLANE,1
WPSTYLE,,,,,,,,0
RESUME,'save8','db','B:\KPI\term6\AnsysWork\lab8\',0,0
/COM,ANSYS RELEASE 2022 R2           BUILD 22.2      UP20220516       00:45:34
/SOLU
/STATUS,SOLU
SOLVE
/BATCH
/COM,ANSYS RELEASE 2022 R2           BUILD 22.2      UP20220516       00:45:50
/input,menust,tmp,''
/GST,ON
/PLO,INFO,3
/GRO,CURL,ON
/CPLANE,1
WPSTYLE,,,,,,,,0
RESUME,'save8','db','B:\KPI\term6\AnsysWork\lab8\',0,0
/COM,ANSYS RELEASE 2022 R2           BUILD 22.2      UP20220516       00:45:55
/SOLU
/STATUS,SOLU
SOLVE
/BATCH
/COM,ANSYS RELEASE 2022 R2           BUILD 22.2      UP20220516       00:47:26
/input,menust,tmp,''
/GST,ON
/PLO,INFO,3
/GRO,CURL,ON
/CPLANE,1
WPSTYLE,,,,,,,,0
RESUME,'save8','db','B:\KPI\term6\AnsysWork\lab8\',0,0
/COM,ANSYS RELEASE 2022 R2           BUILD 22.2      UP20220516       00:47:33
/SOLU
/STATUS,SOLU
SOLVE
/BATCH
/COM,ANSYS RELEASE 2022 R2           BUILD 22.2      UP20220516       00:48:40
/input,menust,tmp,''
/GST,ON
/PLO,INFO,3
/GRO,CURL,ON
/CPLANE,1
WPSTYLE,,,,,,,,0
RESUME,'save8','db','B:\KPI\term6\AnsysWork\lab8\',0,0
/COM,ANSYS RELEASE 2022 R2           BUILD 22.2      UP20220516       00:48:49
/SOLU
/STATUS,SOLU
SOLVE
/BATCH
/COM,ANSYS RELEASE 2022 R2           BUILD 22.2      UP20220516       00:49:37
/input,menust,tmp,''
/GST,ON
/PLO,INFO,3
/GRO,CURL,ON
/CPLANE,1
WPSTYLE,,,,,,,,0
RESUME,'save8','db','B:\KPI\term6\AnsysWork\lab8\',0,0
/COM,ANSYS RELEASE 2022 R2           BUILD 22.2      UP20220516       00:49:46
APLOT
/PSF,PRES,NORM,2,0,1
/PBF,DEFA, ,1
/PSYMB,CS,0
/PSYMB,NDIR,0
/PSYMB,ESYS,0
/PSYMB,LDIV,0
/PSYMB,LDIR,0
/PSYMB,ADIR,0
/PSYMB,ECON,0
/PSYMB,XNODE,0
/PSYMB,DOT,1
/PSYMB,PCONV,
/PSYMB,LAYR,0
/PSYMB,FBCS,0
/PBC,ALL,,1
/PBC,NFOR,,0
/PBC,NMOM,,0
/PBC,RFOR,,0
/PBC,RMOM,,0
/PBC,PATH,,0
NPLOT
EPLOT
APLOT
LPLOT
LPLOT
APLOT
VPLOT
RESUME,'save5','db','B:\KPI\term6\AnsysWork\lab8\',0,0
/COM,ANSYS RELEASE 2022 R2           BUILD 22.2      UP20220516       01:01:09
RESUME,'save4','db','B:\KPI\term6\AnsysWork\lab8\',0,0
/COM,ANSYS RELEASE 2022 R2           BUILD 22.2      UP20220516       01:01:15
/SOLU
FINISH
/PREP7
ESIZE,0.005,0,
MSHKEY,0
CM,_Y,AREA
ASEL, , , ,       2
CM,_Y1,AREA
CHKMSH,'AREA'
CMSEL,S,_Y
AMESH,_Y1
CMDELE,_Y
CMDELE,_Y1
CMDELE,_Y2
/NUMBER,0
/SHRINK,0
/ESHAPE,1.0
/EFACET,1
/RATIO,1,1,1
/CFORMAT,32,0
EPLOT
SAVE,'save5','db','B:\KPI\term6\AnsysWork\lab8\'
ANTYPE,0
SAVE,'save5','db','B:\KPI\term6\AnsysWork\lab8\'
FINISH
/SOL
FLST,2,5,4,ORDE,3
FITEM,2,56
FITEM,2,-59
FITEM,2,82
/GO
DL,P51X, ,ALL,
FLST,2,4,4,ORDE,4
FITEM,2,54
FITEM,2,-55
FITEM,2,60
FITEM,2,-61
/GO
SFL,P51X,PRES,98685.714,0
SAVE,'save6','db','B:\KPI\term6\AnsysWork\lab8\'
/PSF,PRES,NORM,2,0,1
/PBF,DEFA, ,1
/PSYMB,CS,0
/PSYMB,NDIR,0
/PSYMB,ESYS,0
/PSYMB,LDIV,0
/PSYMB,LDIR,0
/PSYMB,ADIR,0
/PSYMB,ECON,0
/PSYMB,XNODE,0
/PSYMB,DOT,1
/PSYMB,PCONV,
/PSYMB,LAYR,0
/PSYMB,FBCS,0
/PBC,ALL,,1
/PBC,NFOR,,0
/PBC,NMOM,,0
/PBC,RFOR,,0
/PBC,RMOM,,0
/PBC,PATH,,0
EPLOT
APLOT
/STATUS,SOLU
SOLVE
EPLOT
/STATUS,SOLU
SOLVE
RESUME,'save1','db','B:\KPI\term6\AnsysWork\lab8\',0,0
/COM,ANSYS RELEASE 2022 R2           BUILD 22.2      UP20220516       01:14:09
/NOPR
KEYW,PR_SET,1
KEYW,PR_STRUC,1
KEYW,PR_THERM,0
KEYW,PR_FLUID,0
KEYW,PR_ELMAG,0
KEYW,MAGNOD,0
KEYW,MAGEDG,0
KEYW,MAGHFE,0
KEYW,MAGELC,0
KEYW,PR_MULTI,0
/GO
/COM,
/COM,Preferences for GUI filtering have been set to display:
/COM,  Structural
FINISH
/PREP7
ET,1,PLANE183
KEYOPT,1,1,0
KEYOPT,1,3,3
KEYOPT,1,6,0
R,1,0.005,
R,1,0.005,
MPTEMP,,,,,,,,
MPTEMP,1,0
MPDATA,EX,1,,2.05e+11
MPDATA,PRXY,1,,0.27
MPTEMP,,,,,,,,
MPTEMP,1,0
MPDATA,DENS,1,,7800
SAVE,'save2','db','B:\KPI\term6\AnsysWork\lab8\'
ESIZE,0.005,0,
MSHKEY,0
CM,_Y,AREA
ASEL, , , ,       1
CM,_Y1,AREA
CHKMSH,'AREA'
CMSEL,S,_Y
AMESH,_Y1
CMDELE,_Y
CMDELE,_Y1
CMDELE,_Y2
MSHKEY,0
/NUMBER,0
/SHRINK,0
/ESHAPE,1.0
/EFACET,1
/RATIO,1,1,1
/CFORMAT,32,0
FINISH
/SOLU
FINISH
/PREP7
ANTYPE,0
SAVE,'save3','db','B:\KPI\term6\AnsysWork\lab8\'
FINISH
/SOL
FLST,2,4,4,ORDE,2
FITEM,2,56
FITEM,2,-59
/GO
FLST,2,4,4,ORDE,2
FITEM,2,56
FITEM,2,-59
/GO
DL,P51X, ,ALL,
/LIG,   1,1, 1.000,   0.00000000000    ,   0.00000000000    ,   0.00000000000    ,   0.00000000000
FLST,2,4,4,ORDE,4
FITEM,2,54
FITEM,2,-55
FITEM,2,60
FITEM,2,-61
/GO
SAVE,'save4','db','B:\KPI\term6\AnsysWork\lab8\'
FLST,2,1,4,ORDE,1
FITEM,2,60
/GO
SFL,P51X,PRES,0,98685.714
FLST,2,1,4,ORDE,1
FITEM,2,55
/GO
SFL,P51X,PRES,0,98685.714
FLST,2,1,4,ORDE,1
FITEM,2,61
/GO
SFL,P51X,PRES,98685.714,0
FLST,2,1,4,ORDE,1
FITEM,2,54
/GO
SFL,P51X,PRES,98685.714,0
/PSF,PRES,NORM,2,0,1
/PBF,DEFA, ,1
/PSYMB,CS,0
/PSYMB,NDIR,0
/PSYMB,ESYS,0
/PSYMB,LDIV,0
/PSYMB,LDIR,0
/PSYMB,ADIR,0
/PSYMB,ECON,0
/PSYMB,XNODE,0
/PSYMB,DOT,1
/PSYMB,PCONV,
/PSYMB,LAYR,0
/PSYMB,FBCS,0
/PBC,ALL,,1
/PBC,NFOR,,0
/PBC,NMOM,,0
/PBC,RFOR,,0
/PBC,RMOM,,0
/PBC,PATH,,0
/STATUS,SOLU
SOLVE
SAVE,'save5','db','B:\KPI\term6\AnsysWork\lab8\'
FINISH
/POST1
SET,LAST
/EFACET,1
PLNSOL, U,SUM, 0,1.0
SAVE,'save6','db','B:\KPI\TERM6\ANSYSWORK\LAB8\'
/EFACET,1
PLNSOL, S,EQV, 0,1.0
PLESOL, S,EQV, 0,1.0
PRRSOL,
SAVE,'LabWork3frm','db','B:\KPI\TERM6\ANSYSWORK\LAB8\'
SAVE,'LabWork8frm','db','B:\KPI\TERM6\ANSYSWORK\LAB8\'
FINISH
! /EXIT,ALL
/BATCH
/COM,ANSYS RELEASE 2022 R2           BUILD 22.2      UP20220516       09:24:27
/input,menust,tmp,''
/GST,ON
/PLO,INFO,3
/GRO,CURL,ON
/CPLANE,1
WPSTYLE,,,,,,,,0
RESUME,'save6','db','B:\KPI\term6\AnsysWork\lab8\',0,0
/COM,ANSYS RELEASE 2022 R2           BUILD 22.2      UP20220516       09:24:35
/POST26
FILE,'LabWork8frm','rst','.'
NUMVAR,200
SOLU,191,NCMIT
STORE,MERGE
FILLDATA,191,,,,1,1
REALVAR,191,191
FINISH
/POST1
SET,LAST
/EFACET,1
PLNSOL, U,SUM, 0,1.0
/EFACET,1
PLNSOL, S,EQV, 0,1.0
FINISH
! /EXIT,NOSAV
