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/BATCH
/COM,ANSYS RELEASE 2022 R2           BUILD 22.2      UP20220516       01:52:48
/input,menust,tmp,''
/GST,ON
/PLO,INFO,3
/GRO,CURL,ON
/CPLANE,1
WPSTYLE,,,,,,,,0
/FILNAME,LabWork8vol,1
/BATCH
/COM,ANSYS RELEASE 2022 R2           BUILD 22.2      UP20220516       01:53:27
/CLEAR,START
/COM,ANSYS RELEASE 2022 R2           BUILD 22.2      UP20220516       01:53:33
/input,start,ans,'B:\ANSYS Inc\ANSYS Student\v222\ANSYS\apdl\'
RESUME,'LabWork3frm.db','bak','B:\KPI\term6\AnsysWork\lab8\',0,0
/COM,ANSYS RELEASE 2022 R2           BUILD 22.2      UP20220516       01:53:53
RESUME,'LabWork3frm','db','B:\KPI\term6\AnsysWork\lab8\',0,0
/COM,ANSYS RELEASE 2022 R2           BUILD 22.2      UP20220516       01:55:22
RESUME,'LabWork3frm.db','bak','B:\KPI\term6\AnsysWork\lab8\',0,0
/COM,ANSYS RELEASE 2022 R2           BUILD 22.2      UP20220516       01:55:36
RESUME,'LabWork3frm','db','B:\KPI\term6\AnsysWork\lab8\',0,0
/COM,ANSYS RELEASE 2022 R2           BUILD 22.2      UP20220516       01:57:02
/PREP7
FLST,2,1,5,ORDE,1
FITEM,2,2
VEXT,P51X, , ,0,0,0.0025,,,,
FLST,2,1,5,ORDE,1
FITEM,2,1
VEXT,P51X, , ,0,0,-0.0025,,,,
RESUME,'LabWork3frm','db','B:\KPI\term6\AnsysWork\lab8\',0,0
/COM,ANSYS RELEASE 2022 R2           BUILD 22.2      UP20220516       01:58:10
FLST,2,1,5,ORDE,1
FITEM,2,2
VEXT,P51X, , ,0,0,-0.0025,,,,
FLST,2,1,5,ORDE,1
FITEM,2,1
VEXT,P51X, , ,0,0,0.0025,,,,
RESUME,'LabWork3frm','db','B:\KPI\term6\AnsysWork\lab8\',0,0
/COM,ANSYS RELEASE 2022 R2           BUILD 22.2      UP20220516       01:58:57
FLST,2,1,5,ORDE,1
FITEM,2,2
VEXT,P51X, , ,0,0,0.0025,,,,
FLST,2,1,5,ORDE,1
FITEM,2,1
VEXT,P51X, , ,0,0,0.0025,,,,
SAVE,'part2_save1','db','B:\KPI\term6\AnsysWork\lab8\'
/UNITS, si
*AFUN,DEG
/NOPR
KEYW,PR_SET,1
KEYW,PR_STRUC,1
KEYW,PR_THERM,0
KEYW,PR_FLUID,0
KEYW,PR_ELMAG,0
KEYW,MAGNOD,0
KEYW,MAGEDG,0
KEYW,MAGHFE,0
KEYW,MAGELC,0
KEYW,PR_MULTI,0
/GO
/COM,
/COM,Preferences for GUI filtering have been set to display:
/COM,  Structural
ET,1,SOLID186
SAVE,'part2_save2','db','B:\KPI\term6\AnsysWork\lab8\'
ESIZE,0.005,0,
MSHKEY,0
MSHAPE,1,3d
CM,_Y,VOLU
VSEL, , , ,       2
CM,_Y1,VOLU
CHKMSH,'VOLU'
CMSEL,S,_Y
VMESH,_Y1
CMDELE,_Y
CMDELE,_Y1
CMDELE,_Y2
FINISH
/SOL
SAVE,'part2_save3','db','B:\KPI\term6\AnsysWork\lab8\'
FLST,2,4,5,ORDE,2
FITEM,2,48
FITEM,2,-51
/GO
DA,P51X,ALL,
SAVE,'part2_save4','db','B:\KPI\term6\AnsysWork\lab8\'
LPLOT
FLST,2,1,3,ORDE,1
FITEM,2,62
FLST,2,1,3,ORDE,1
FITEM,2,62
/GO
FK,P51X,FX,11
FLST,2,1,3,ORDE,1
FITEM,2,56
/GO
FK,P51X,FX,11
SAVE,'part2_save5','db','B:\KPI\term6\AnsysWork\lab8\'
/STATUS,SOLU
SOLVE
FINISH
/PREP7
MPTEMP,,,,,,,,
MPTEMP,1,0
MPDATA,EX,1,,2.05e+11
MPDATA,PRXY,1,,0.27
MPTEMP,,,,,,,,
MPTEMP,1,0
MPDATA,DENS,1,,7800
FINISH
/SOL
/STATUS,SOLU
SOLVE
/BATCH
/COM,ANSYS RELEASE 2022 R2           BUILD 22.2      UP20220516       02:14:44
/input,menust,tmp,''
/GST,ON
/PLO,INFO,3
/GRO,CURL,ON
/CPLANE,1
WPSTYLE,,,,,,,,0
RESUME,'part2_save5','db','B:\KPI\term6\AnsysWork\lab8\',0,0
/COM,ANSYS RELEASE 2022 R2           BUILD 22.2      UP20220516       02:14:52
LPLOT
APLOT
/PREP7
FINISH
/SOL
FINISH
/PREP7
MPTEMP,,,,,,,,
MPTEMP,1,0
MPDATA,EX,1,,2.05e+11
MPDATA,PRXY,1,,0.27
MPTEMP,,,,,,,,
MPTEMP,1,0
MPDATA,DENS,1,,7800
SAVE,'part2_save6','db','B:\KPI\term6\AnsysWork\lab8\'
FINISH
/SOL
/STATUS,SOLU
SOLVE
/BATCH
/COM,ANSYS RELEASE 2022 R2           BUILD 22.2      UP20220516       02:16:14
/input,menust,tmp,''
/GST,ON
/PLO,INFO,3
/GRO,CURL,ON
/CPLANE,1
WPSTYLE,,,,,,,,0
RESUME,'part2_save6','db','B:\KPI\term6\AnsysWork\lab8\',0,0
/COM,ANSYS RELEASE 2022 R2           BUILD 22.2      UP20220516       02:16:32
/SOLU
/STATUS,SOLU
SOLVE
/BATCH
/COM,ANSYS RELEASE 2022 R2           BUILD 22.2      UP20220516       02:16:51
/input,menust,tmp,''
/GST,ON
/PLO,INFO,3
/GRO,CURL,ON
/CPLANE,1
WPSTYLE,,,,,,,,0
RESUME,'part2_save1','db','B:\KPI\term6\AnsysWork\lab8\',0,0
/COM,ANSYS RELEASE 2022 R2           BUILD 22.2      UP20220516       02:17:10
/PREP7
ET,1,SOLID186
MPTEMP,,,,,,,,
MPTEMP,1,0
MPDATA,EX,1,,2.05e+11
MPDATA,PRXY,1,,0.27
MPTEMP,,,,,,,,
MPTEMP,1,0
MPDATA,DENS,1,,7800
ESIZE,0.005,0,
MSHKEY,0
MSHAPE,1,3d
CM,_Y,VOLU
VSEL, , , ,       2
CM,_Y1,VOLU
CHKMSH,'VOLU'
CMSEL,S,_Y
VMESH,_Y1
CMDELE,_Y
CMDELE,_Y1
CMDELE,_Y2
FINISH
/SOL
FLST,2,4,5,ORDE,2
FITEM,2,48
FITEM,2,-51
/GO
DA,P51X,ALL,
RESUME,'part2_save1','db','B:\KPI\term6\AnsysWork\lab8\',0,0
/COM,ANSYS RELEASE 2022 R2           BUILD 22.2      UP20220516       02:21:02
FINISH
/PREP7
ET,1,SOLID186
MPTEMP,,,,,,,,
MPTEMP,1,0
MPDATA,EX,1,,2.05e11
MPDATA,PRXY,1,,0.27
MPTEMP,,,,,,,,
MPTEMP,1,0
MPDATA,DENS,1,,7800
ESIZE,0.005,0,
MSHKEY,0
MSHAPE,1,3d
CM,_Y,VOLU
VSEL, , , ,       2
CM,_Y1,VOLU
CHKMSH,'VOLU'
CMSEL,S,_Y
VMESH,_Y1
CMDELE,_Y
CMDELE,_Y1
CMDELE,_Y2
SAVE,'part2_save2','db','B:\KPI\term6\AnsysWork\lab8\'
FINISH
/SOL
FINISH
/PREP7
FINISH
/SOL
FLST,2,8,5,ORDE,4
FITEM,2,21
FITEM,2,-24
FITEM,2,48
FITEM,2,-51
/GO
DA,P51X,ALL,
SAVE,'part2_save3','db','B:\KPI\term6\AnsysWork\lab8\'
LPLOT
FLST,2,1,3,ORDE,1
FITEM,2,62
/GO
FK,P51X,FX,11
FLST,2,1,3,ORDE,1
FITEM,2,56
/GO
FK,P51X,FX,11
SAVE,'part2_save4','db','B:\KPI\term6\AnsysWork\lab8\'
/STATUS,SOLU
SOLVE
/BATCH
/COM,ANSYS RELEASE 2022 R2           BUILD 22.2      UP20220516       02:25:12
/input,menust,tmp,''
/GST,ON
/PLO,INFO,3
/GRO,CURL,ON
/CPLANE,1
WPSTYLE,,,,,,,,0
/PREP7
RESUME,'part2_save4','db','B:\KPI\term6\AnsysWork\lab8\',0,0
/COM,ANSYS RELEASE 2022 R2           BUILD 22.2      UP20220516       02:25:45
RESUME,'part2_save4','db','B:\KPI\term6\AnsysWork\lab8\',0,0
/COM,ANSYS RELEASE 2022 R2           BUILD 22.2      UP20220516       02:26:53
APLOT
/PSF,PRES,NORM,2,0,1
/PBF,DEFA, ,1
/PSYMB,CS,0
/PSYMB,NDIR,0
/PSYMB,ESYS,0
/PSYMB,LDIV,0
/PSYMB,LDIR,0
/PSYMB,ADIR,0
/PSYMB,ECON,0
/PSYMB,XNODE,0
/PSYMB,DOT,1
/PSYMB,PCONV,
/PSYMB,LAYR,0
/PSYMB,FBCS,0
/PBC,ALL,,1
/PBC,NFOR,,0
/PBC,NMOM,,0
/PBC,RFOR,,0
/PBC,RMOM,,0
/PBC,PATH,,0
/NUMBER,0
FINISH
/SOL
/STATUS,SOLU
SOLVE
/BATCH
/COM,ANSYS RELEASE 2022 R2           BUILD 22.2      UP20220516       02:28:31
/input,menust,tmp,''
/GST,ON
/PLO,INFO,3
/GRO,CURL,ON
/CPLANE,1
WPSTYLE,,,,,,,,0
RESUME,'part2_save4','db','B:\KPI\term6\AnsysWork\lab8\',0,0
/COM,ANSYS RELEASE 2022 R2           BUILD 22.2      UP20220516       02:28:42
/PREP7
/PSF,PRES,NORM,2,0,1
/PBF,DEFA, ,1
/PSYMB,CS,0
/PSYMB,NDIR,0
/PSYMB,ESYS,0
/PSYMB,LDIV,0
/PSYMB,LDIR,0
/PSYMB,ADIR,0
/PSYMB,ECON,0
/PSYMB,XNODE,0
/PSYMB,DOT,1
/PSYMB,PCONV,
/PSYMB,LAYR,0
/PSYMB,FBCS,0
/PBC,ALL,,1
/PBC,NFOR,,0
/PBC,NMOM,,0
/PBC,RFOR,,0
/PBC,RMOM,,0
/PBC,PATH,,0
SAVE,'part2_save4','db','B:\KPI\term6\AnsysWork\lab8\'
FINISH
/SOL
/STATUS,SOLU
SOLVE
/BATCH
/COM,ANSYS RELEASE 2022 R2           BUILD 22.2      UP20220516       02:30:13
/input,menust,tmp,''
/GST,ON
/PLO,INFO,3
/GRO,CURL,ON
/CPLANE,1
WPSTYLE,,,,,,,,0
/SOLU
ANTYPE,0
/STATUS,SOLU
SOLVE
RESUME,'part2_save4','dbb','B:\KPI\term6\AnsysWork\lab8\',0,0
/COM,ANSYS RELEASE 2022 R2           BUILD 22.2      UP20220516       02:33:43
/PSF,PRES,NORM,2,0,1
/PBF,DEFA, ,1
/PSYMB,CS,0
/PSYMB,NDIR,0
/PSYMB,ESYS,0
/PSYMB,LDIV,0
/PSYMB,LDIR,0
/PSYMB,ADIR,0
/PSYMB,ECON,0
/PSYMB,XNODE,0
/PSYMB,DOT,1
/PSYMB,PCONV,
/PSYMB,LAYR,0
/PSYMB,FBCS,0
/PBC,ALL,,1
/PBC,NFOR,,0
/PBC,NMOM,,0
/PBC,RFOR,,0
/PBC,RMOM,,0
/PBC,PATH,,0
/NUMBER,0
/STATUS,SOLU
SOLVE
/BATCH
/COM,ANSYS RELEASE 2022 R2           BUILD 22.2      UP20220516       02:38:15
/input,menust,tmp,''
/GST,ON
/PLO,INFO,3
/GRO,CURL,ON
/CPLANE,1
WPSTYLE,,,,,,,,0
RESUME,'part2_save4','db','B:\KPI\term6\AnsysWork\lab8\',0,0
/COM,ANSYS RELEASE 2022 R2           BUILD 22.2      UP20220516       02:38:20
/SOLU
/STATUS,SOLU
SOLVE
/BATCH
/COM,ANSYS RELEASE 2022 R2           BUILD 22.2      UP20220516       02:47:17
/input,menust,tmp,''
/GST,ON
/PLO,INFO,3
/GRO,CURL,ON
/CPLANE,1
WPSTYLE,,,,,,,,0
RESUME,'part2_save4new','db','B:\KPI\TERM6\ANSYSWORK\LAB8\',0,0
/COM,ANSYS RELEASE 2022 R2           BUILD 22.2      UP20220516       02:47:28
APLOT
VPLOT
LPLOT
VPLOT
/POST1
SET,LAST
FINISH
! /EXIT,NOSAV
/BATCH
/COM,ANSYS RELEASE 2022 R2           BUILD 22.2      UP20220516       02:52:52
/input,menust,tmp,''
/GST,ON
/PLO,INFO,3
/GRO,CURL,ON
/CPLANE,1
WPSTYLE,,,,,,,,0
RESUME,'part2_save4new','db','B:\KPI\term6\AnsysWork\lab8\',0,0
/COM,ANSYS RELEASE 2022 R2           BUILD 22.2      UP20220516       02:53:04
RESUME,'part2_save5','db','B:\KPI\term6\AnsysWork\lab8\',0,0
/COM,ANSYS RELEASE 2022 R2           BUILD 22.2      UP20220516       02:55:59
/POST1
SET,LAST
PLESOL, S,Z, 0,1.0
PLESOL, S,EQV, 0,1.0
/CONT,1,9,AUTO
FINISH
! /EXIT,ALL
/BATCH
/COM,ANSYS RELEASE 2022 R2           BUILD 22.2      UP20220516       08:49:20
/input,menust,tmp,''
/GST,ON
/PLO,INFO,3
/GRO,CURL,ON
/CPLANE,1
WPSTYLE,,,,,,,,0
RESUME,'part2_save5','db','B:\KPI\term6\AnsysWork\lab8\',0,0
/COM,ANSYS RELEASE 2022 R2           BUILD 22.2      UP20220516       08:50:02
/POST1
SET,LAST
PLESOL, S,Z, 0,1.0
PLESOL, S,EQV, 0,1.0
/CONT,1,9,AUTO
/CONT,1,9,730.594, ,262711
FINISH
! /EXIT,NOSAV
/BATCH
/COM,ANSYS RELEASE 2022 R2           BUILD 22.2      UP20220516       09:28:42
/input,menust,tmp,''
/GST,ON
/PLO,INFO,3
/GRO,CURL,ON
/CPLANE,1
WPSTYLE,,,,,,,,0
RESUME,'part2_save5','db','B:\KPI\term6\AnsysWork\lab8\',0,0
/COM,ANSYS RELEASE 2022 R2           BUILD 22.2      UP20220516       09:28:49
/SOLU
FINISH
/POST1
SET,LAST
PLESOL, S,Z, 0,1.0
PLESOL, S,EQV, 0,1.0
/CONT,1,9,AUTO
/CONT,1,9,730.594, ,295458
FINISH
! /EXIT,NOSAV
