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/BATCH
/COM,ANSYS RELEASE 2022 R2           BUILD 22.2      UP20220516       18:09:23
/input,menust,tmp,''
/GST,ON
/PLO,INFO,3
/GRO,CURL,ON
/CPLANE,1
WPSTYLE,,,,,,,,0
/UNITS, Si
*AFUN,DEG
/PREP7
BLC5,0,0,0.5,0.25,0.15
FLST,2,4,3,ORDE,2
FITEM,2,5
FITEM,2,-8
KWPAVE,P51X
VDELE,       1, , ,1
WPCSYS,-1,0
WPAVE,0,0,0
BLC5,0,0,0.5,0.25,0.005
KWPLAN,-1,       8,       5,       7
KWPLAN,-1,       6,       7,       8
FLST,2,4,3,ORDE,2
FITEM,2,5
FITEM,2,-8
KWPAVE,P51X
wpro,30.000000,,
wpro,-30.000000,,
wpro,90.000000,,
wpro,90.000000,,
wpro,90.000000,,
CYL4,0,0,0.15/2
/NUMBER,0
LPLOT
FINISH
/SOL
FINISH
/PREP7
FLST,2,4,4,ORDE,2
FITEM,2,13
FITEM,2,-16
LDELE,P51X, , ,1
FLST,2,4,4,ORDE,2
FITEM,2,13
FITEM,2,-16
LDELE,P51X, , ,1
FINISH
/CLEAR,NOSTART
/COM,ANSYS RELEASE 2022 R2           BUILD 22.2      UP20220516       18:24:40
/UNITS, Si
*AFUN,DEG
/SOLU
FINISH
/PREP7
BLC5,0,0,0.5,0.25,0.005
CYL4,0,0,0.15/2, , , ,0.005
VPLOT
FLST,2,2,6,ORDE,2
FITEM,2,1
FITEM,2,-2
FLST,3,2,6,ORDE,2
FITEM,3,1
FITEM,3,-2
VSBV,P51X,P51X
VSBV,       1,       2
SAVE
SAVE
SAVE
RESUME
/COM,ANSYS RELEASE 2022 R2           BUILD 22.2      UP20220516       18:27:04
FLST,2,22,4,ORDE,2
FITEM,2,1
FITEM,2,-22
LDIV,P51X,0.5, ,2,0
LPLOT
FINISH
/SOL
FINISH
/PREP7
/NOPR
KEYW,PR_SET,1
KEYW,PR_STRUC,1
KEYW,PR_THERM,0
KEYW,PR_FLUID,0
KEYW,PR_ELMAG,0
KEYW,MAGNOD,0
KEYW,MAGEDG,0
KEYW,MAGHFE,0
KEYW,MAGELC,0
KEYW,PR_MULTI,0
/GO
/COM,
/COM,Preferences for GUI filtering have been set to display:
/COM,  Structural
ET,1,PLANE182
KEYOPT,1,1,0
KEYOPT,1,3,3
KEYOPT,1,6,0
R,1,0.005,
MPTEMP,,,,,,,,
MPTEMP,1,0
MPDATA,EX,1,,2.05e11
MPDATA,PRXY,1,,0.27
MPTEMP,,,,,,,,
MPTEMP,1,0
MPDATA,DENS,1,,7800
SAVE,'save01','db','B:\KPI\TERM6\ANSYSWORK\LAB9\'
MSHKEY,0
ESIZE,0.025,0,
MSHKEY,0
VPLOT
FLST,5,8,5,ORDE,4
FITEM,5,3
FITEM,5,-6
FITEM,5,9
FITEM,5,-12
CM,_Y,AREA
ASEL, , , ,P51X
CM,_Y1,AREA
CHKMSH,'AREA'
CMSEL,S,_Y
! AMESH,_Y1
CMDELE,_Y
CMDELE,_Y1
CMDELE,_Y2
RESUME,'save01','db','B:\KPI\TERM6\ANSYSWORK\LAB9\',0,0
/COM,ANSYS RELEASE 2022 R2           BUILD 22.2      UP20220516       18:41:29
ESIZE,0.025,0,
MSHKEY,0
CM,_Y,AREA
ASEL, , , ,      11
CM,_Y1,AREA
CHKMSH,'AREA'
CMSEL,S,_Y
AMESH,_Y1
CMDELE,_Y
CMDELE,_Y1
CMDELE,_Y2
/SHRINK,0
/ESHAPE,1.0
/EFACET,1
/RATIO,1,1,1
/CFORMAT,32,0
SAVE,'save02','db','B:\KPI\TERM6\ANSYSWORK\LAB9\'
FINISH
/SOL
ANTYPE,0
LPLOT
/NUMBER,0
SAVE,'save03','db','B:\KPI\TERM6\ANSYSWORK\LAB9\'
FLST,2,2,3,ORDE,2
FITEM,2,9
FITEM,2,12
/GO
DK,P51X, ,0, ,0,UX, , , , , ,
FLST,2,2,3,ORDE,2
FITEM,2,14
FITEM,2,16
/GO
DK,P51X, ,0, ,0,UX, , , , , ,
FLST,2,4,3,ORDE,4
FITEM,2,11
FITEM,2,13
FITEM,2,15
FITEM,2,38
/GO
DK,P51X, ,0, ,0,UY, , , , , ,
SAVE,'save15','db','B:\KPI\TERM6\ANSYSWORK\LAB9\'
/LIG,   1,1, 1.000,   0.00000000000    ,   0.00000000000    ,   0.00000000000    ,   0.00000000000
FINISH
/PREP7
LSTR,      14,      23
LSTR,      12,      18
LSTR,       9,      20
LSTR,      16,      21
LSTR,      13,      22
LSTR,      19,      10
LSTR,      11,      17
LSTR,      24,      15
FLST,2,8,4,ORDE,2
FITEM,2,45
FITEM,2,-52
LDIV,P51X,0.5, ,2,0
FINISH
/SOL
FLST,2,16,4,ORDE,2
FITEM,2,45
FITEM,2,-60
/GO
SFL,P51X,PRES,-7e7,
SBCTRAN
GPLOT
/STATUS,SOLU
SOLVE
FINISH
/POST1
SET,LAST
/EFACET,1
PLNSOL, U,SUM, 1,1.0
RESUME,'save02','db','B:\KPI\TERM6\ANSYSWORK\LAB9\',0,0
/COM,ANSYS RELEASE 2022 R2           BUILD 22.2      UP20220516       19:06:44
RESUME,'save03','db','B:\KPI\TERM6\ANSYSWORK\LAB9\',0,0
/COM,ANSYS RELEASE 2022 R2           BUILD 22.2      UP20220516       19:06:48
/NUMBER,0
APLOT
VPLOT
LPLOT
RESUME,'save15','db','B:\KPI\TERM6\ANSYSWORK\LAB9\',0,0
/COM,ANSYS RELEASE 2022 R2           BUILD 22.2      UP20220516       19:07:11
RESUME,'save03','db','B:\KPI\TERM6\ANSYSWORK\LAB9\',0,0
/COM,ANSYS RELEASE 2022 R2           BUILD 22.2      UP20220516       19:08:21
FINISH
/PREP7
FINISH
/SOL
ANTYPE,0
/NUMBER,0
LPLOT
FLST,2,4,3,ORDE,4
FITEM,2,9
FITEM,2,12
FITEM,2,14
FITEM,2,16
/GO
DK,P51X, ,0, ,0,UY, , , , , ,
FLST,2,4,3,ORDE,4
FITEM,2,13
FITEM,2,15
FITEM,2,37
FITEM,2,-38
/GO
DK,P51X, ,0, ,0,UX, , , , , ,
SAVE,'save15','db','B:\KPI\TERM6\ANSYSWORK\LAB9\'
FINISH
/PREP7
LSTR,      12,      18
LSTR,      14,      23
LSTR,      13,      22
LSTR,      19,      10
FINISH
/SOL
FINISH
/PREP7
FLST,2,4,4,ORDE,2
FITEM,2,45
FITEM,2,-48
LDIV,P51X,0.5, ,2,0
LSTR,      17,      11
LSTR,      15,      24
LSTR,      16,      21
LSTR,       9,      20
FLST,2,4,4,ORDE,2
FITEM,2,53
FITEM,2,-56
LDIV,P51X,0.5, ,2,0
FINISH
/SOL
/PSF,PRES,NORM,2,0,1
/PBF,DEFA, ,1
/PSYMB,CS,0
/PSYMB,NDIR,0
/PSYMB,ESYS,0
/PSYMB,LDIV,0
/PSYMB,LDIR,0
/PSYMB,ADIR,0
/PSYMB,ECON,0
/PSYMB,XNODE,0
/PSYMB,DOT,1
/PSYMB,PCONV,
/PSYMB,LAYR,0
/PSYMB,FBCS,0
/PBC,ALL,,1
/PBC,NFOR,,0
/PBC,NMOM,,0
/PBC,RFOR,,0
/PBC,RMOM,,0
/PBC,PATH,,0
SBCTRAN
EPLOT
FINISH
! /EXIT,NOSAV
/BATCH
/COM,ANSYS RELEASE 2022 R2           BUILD 22.2      UP20220516       22:16:11
/input,menust,tmp,''
/GST,ON
/PLO,INFO,3
/GRO,CURL,ON
/CPLANE,1
WPSTYLE,,,,,,,,0
RESUME,'save15','db','B:\KPI\term6\AnsysWork\lab9\',0,0
/COM,ANSYS RELEASE 2022 R2           BUILD 22.2      UP20220516       22:16:21
/SOL
ANTYPE,0
FLST,2,2,3,ORDE,2
FITEM,2,6
FITEM,2,8
/GO
DK,P51X, ,0, ,0,UY, , , , , ,
FLST,2,2,3,ORDE,2
FITEM,2,5
FITEM,2,7
/GO
DK,P51X, ,0, ,0,UX, , , , , ,
GPLOT
FLST,2,2,4,ORDE,2
FITEM,2,4
FITEM,2,9
/GO
GPLOT
FLST,2,1,4,ORDE,1
FITEM,2,9
/GO
FLST,2,4,4,ORDE,4
FITEM,2,2
FITEM,2,4
FITEM,2,9
FITEM,2,-10
/GO
SFL,P51X,PRES,0,168E6
FLST,2,4,4,ORDE,4
FITEM,2,2
FITEM,2,4
FITEM,2,9
FITEM,2,-10
/GO
SFL,P51X,PRES,0,-168000000
SBCTRAN
/PSF,PRES,NORM,2,0,1
/PBF,DEFA, ,1
/PSYMB,CS,0
/PSYMB,NDIR,0
/PSYMB,ESYS,0
/PSYMB,LDIV,0
/PSYMB,LDIR,0
/PSYMB,ADIR,0
/PSYMB,ECON,0
/PSYMB,XNODE,0
/PSYMB,DOT,1
/PSYMB,PCONV,
/PSYMB,LAYR,0
/PSYMB,FBCS,0
/PBC,ALL, ,1
FLST,2,2,4,ORDE,2
FITEM,2,2
FITEM,2,10
/GO
SFL,P51X,PRES,-168E6,0
FLST,2,1,4,ORDE,1
FITEM,2,9
/GO
FLST,2,1,4,ORDE,1
FITEM,2,2
/GO
FLST,2,1,4,ORDE,1
FITEM,2,10
/GO
SBCTRAN
FLST,2,1,4,ORDE,1
FITEM,2,2
/GO
SFL,P51X,PRES,0,168E6
FLST,2,1,4,ORDE,1
FITEM,2,9
/GO
SFL,P51X,PRES,-168E6,0
FLST,2,1,4,ORDE,1
FITEM,2,2
/GO
SBCTRAN
FLST,2,1,4,ORDE,1
FITEM,2,2
/GO
SFL,P51X,PRES,168000000,0
FLST,2,1,4,ORDE,1
FITEM,2,2
/GO
SFL,P51X,PRES,0,-168E6
SBCTRAN
FINISH
/PREP7
FINISH
/SOL
FLST,2,4,3,ORDE,2
FITEM,2,5
FITEM,2,-8
DKDELE,P51X,ALL
FLST,2,2,3,ORDE,2
FITEM,2,6
FITEM,2,8
/GO
DK,P51X, ,0, ,0,UX, , , , , ,
FLST,2,2,3,ORDE,2
FITEM,2,5
FITEM,2,7
/GO
DK,P51X, ,0, ,0,UY, , , , , ,
RESUME,'save03','db','B:\KPI\term6\AnsysWork\lab9\',0,0
/COM,ANSYS RELEASE 2022 R2           BUILD 22.2      UP20220516       22:22:27
FINISH
/PREP7
FINISH
/SOL
ANTYPE,0
FLST,2,2,3,ORDE,2
FITEM,2,6
FITEM,2,8
/GO
DK,P51X, ,0, ,0,UY, , , , , ,
FLST,2,2,3,ORDE,2
FITEM,2,5
FITEM,2,7
/GO
DK,P51X, ,0, ,0,UX, , , , , ,
GPLOT
FLST,2,2,4,ORDE,2
FITEM,2,4
FITEM,2,9
/GO
GPLOT
FLST,2,1,4,ORDE,1
FITEM,2,9
/GO
FLST,2,4,4,ORDE,4
FITEM,2,2
FITEM,2,4
FITEM,2,9
FITEM,2,-10
/GO
SFL,P51X,PRES,0,168E6
FLST,2,4,4,ORDE,4
FITEM,2,2
FITEM,2,4
FITEM,2,9
FITEM,2,-10
/GO
SFL,P51X,PRES,0,-168000000
SBCTRAN
/PSF,PRES,NORM,2,0,1
/PBF,DEFA, ,1
/PSYMB,CS,0
/PSYMB,NDIR,0
/PSYMB,ESYS,0
/PSYMB,LDIV,0
/PSYMB,LDIR,0
/PSYMB,ADIR,0
/PSYMB,ECON,0
/PSYMB,XNODE,0
/PSYMB,DOT,1
/PSYMB,PCONV,
/PSYMB,LAYR,0
/PSYMB,FBCS,0
/PBC,ALL, ,1
FLST,2,2,4,ORDE,2
FITEM,2,2
FITEM,2,10
/GO
SFL,P51X,PRES,-168E6,0
FLST,2,1,4,ORDE,1
FITEM,2,9
/GO
FLST,2,1,4,ORDE,1
FITEM,2,2
/GO
FLST,2,1,4,ORDE,1
FITEM,2,10
/GO
SBCTRAN
FLST,2,1,4,ORDE,1
FITEM,2,2
/GO
SFL,P51X,PRES,0,168E6
FLST,2,1,4,ORDE,1
FITEM,2,9
/GO
SFL,P51X,PRES,-168E6,0
FLST,2,1,4,ORDE,1
FITEM,2,2
/GO
SBCTRAN
FLST,2,1,4,ORDE,1
FITEM,2,2
/GO
SFL,P51X,PRES,168000000,0
FLST,2,1,4,ORDE,1
FITEM,2,2
/GO
SFL,P51X,PRES,0,-168E6
SBCTRAN
FINISH
/PREP7
FINISH
/SOL
FLST,2,4,3,ORDE,2
FITEM,2,5
FITEM,2,-8
DKDELE,P51X,ALL
FLST,2,2,3,ORDE,2
FITEM,2,6
FITEM,2,8
/GO
DK,P51X, ,0, ,0,UX, , , , , ,
FLST,2,2,3,ORDE,2
FITEM,2,5
FITEM,2,7
/GO
DK,P51X, ,0, ,0,UY, , , , , ,
RESUME,'save02','db','B:\KPI\term6\AnsysWork\lab9\',0,0
/COM,ANSYS RELEASE 2022 R2           BUILD 22.2      UP20220516       22:27:41
RESUME,'save03','db','B:\KPI\term6\AnsysWork\lab9\',0,0
/COM,ANSYS RELEASE 2022 R2           BUILD 22.2      UP20220516       22:27:45
RESUME,'stage5.12','db','B:\KPI\term6\AnsysWork\lab9\',0,0
/COM,ANSYS RELEASE 2022 R2           BUILD 22.2      UP20220516       22:29:22
FINISH
/PREP7
VPLOT
VPLOT
APLOT
FLST,3,1,5,ORDE,1
FITEM,3,3
AGEN, ,P51X, , , , , , , ,1
FINISH
/SOL
FINISH
/PREP7
BLC5,0,0,0.5,0.25
CYL4,0,0,0.15/2
ASBA,       1,       2
ADELE,       3, , ,1
ADELE,       3, , ,1
RESUME,'save01','db','B:\KPI\TERM6\ANSYSWORK\LAB9\',0,0
/COM,ANSYS RELEASE 2022 R2           BUILD 22.2      UP20220516       22:36:31
FINISH
/CLEAR,NOSTART
/COM,ANSYS RELEASE 2022 R2           BUILD 22.2      UP20220516       22:36:41
/Units, Si
*AFUN,DEG
/PREP7
BLC5,0,0,0.5,0.25
CYL4,0,0,0.15/2
ASBA,       1,       2
SAVE
SAVE,'save01','db','B:\KPI\TERM6\ANSYSWORK\LAB9\'
FLST,2,8,4,ORDE,2
FITEM,2,1
FITEM,2,-8
LDIV,P51X,0.5, ,2,0
/NOPR
KEYW,PR_SET,1
KEYW,PR_STRUC,1
KEYW,PR_THERM,0
KEYW,PR_FLUID,0
KEYW,PR_ELMAG,0
KEYW,MAGNOD,0
KEYW,MAGEDG,0
KEYW,MAGHFE,0
KEYW,MAGELC,0
KEYW,PR_MULTI,0
/GO
/COM,
/COM,Preferences for GUI filtering have been set to display:
/COM,  Structural
ET,1,PLANE182
KEYOPT,1,1,0
KEYOPT,1,3,3
KEYOPT,1,6,0
R,1,0.005,
MPTEMP,,,,,,,,
MPTEMP,1,0
MPDATA,EX,1,,2.05e11
MPDATA,PRXY,1,,0.27
MPTEMP,,,,,,,,
MPTEMP,1,0
MPDATA,DENS,1,,7800
ESIZE,0.025,0,
MSHKEY,0
CM,_Y,AREA
ASEL, , , ,       3
CM,_Y1,AREA
CHKMSH,'AREA'
CMSEL,S,_Y
AMESH,_Y1
CMDELE,_Y
CMDELE,_Y1
CMDELE,_Y2
/SHRINK,0
/ESHAPE,1.0
/EFACET,1
/RATIO,1,1,1
/CFORMAT,32,0
SAVE,'save12','db','B:\KPI\TERM6\ANSYSWORK\LAB9\'
SAVE
FINISH
/SOL
ANTYPE,0
FLST,2,2,3,ORDE,2
FITEM,2,6
FITEM,2,8
/GO
DK,P51X, ,0, ,0,UY, , , , , ,
FLST,2,2,3,ORDE,2
FITEM,2,5
FITEM,2,7
/GO
DK,P51X, ,0, ,0,UX, , , , , ,
GPLOT
SAVE,'save15','db','B:\KPI\term6\AnsysWork\lab9\'
FLST,2,2,4,ORDE,2
FITEM,2,4
FITEM,2,9
/GO
GPLOT
FLST,2,1,4,ORDE,1
FITEM,2,9
/GO
FLST,2,4,4,ORDE,4
FITEM,2,2
FITEM,2,4
FITEM,2,9
FITEM,2,-10
/GO
SFL,P51X,PRES,0,168E6
FLST,2,4,4,ORDE,4
FITEM,2,2
FITEM,2,4
FITEM,2,9
FITEM,2,-10
/GO
SFL,P51X,PRES,0,-168000000
SBCTRAN
/PSF,PRES,NORM,2,0,1
/PBF,DEFA, ,1
/PSYMB,CS,0
/PSYMB,NDIR,0
/PSYMB,ESYS,0
/PSYMB,LDIV,0
/PSYMB,LDIR,0
/PSYMB,ADIR,0
/PSYMB,ECON,0
/PSYMB,XNODE,0
/PSYMB,DOT,1
/PSYMB,PCONV,
/PSYMB,LAYR,0
/PSYMB,FBCS,0
/PBC,ALL, ,1
FLST,2,2,4,ORDE,2
FITEM,2,2
FITEM,2,10
/GO
SFL,P51X,PRES,-168E6,0
FLST,2,1,4,ORDE,1
FITEM,2,9
/GO
FLST,2,1,4,ORDE,1
FITEM,2,2
/GO
FLST,2,1,4,ORDE,1
FITEM,2,10
/GO
SBCTRAN
FLST,2,1,4,ORDE,1
FITEM,2,2
/GO
SFL,P51X,PRES,0,168E6
FLST,2,1,4,ORDE,1
FITEM,2,9
/GO
SFL,P51X,PRES,-168E6,0
FLST,2,1,4,ORDE,1
FITEM,2,2
/GO
SBCTRAN
FLST,2,1,4,ORDE,1
FITEM,2,2
/GO
SFL,P51X,PRES,168000000,0
FLST,2,1,4,ORDE,1
FITEM,2,2
/GO
SFL,P51X,PRES,0,-168E6
SBCTRAN
FINISH
/PREP7
FINISH
/SOL
FLST,2,4,3,ORDE,2
FITEM,2,5
FITEM,2,-8
DKDELE,P51X,ALL
FLST,2,2,3,ORDE,2
FITEM,2,6
FITEM,2,8
/GO
DK,P51X, ,0, ,0,UX, , , , , ,
FLST,2,2,3,ORDE,2
FITEM,2,5
FITEM,2,7
/GO
DK,P51X, ,0, ,0,UY, , , , , ,
RESUME,'save12','db','B:\KPI\TERM6\ANSYSWORK\LAB9\',0,0
/COM,ANSYS RELEASE 2022 R2           BUILD 22.2      UP20220516       22:50:57
FINISH
/CLEAR,NOSTART
/COM,ANSYS RELEASE 2022 R2           BUILD 22.2      UP20220516       22:52:23
/COM,ANSYS RELEASE 2022 R2           BUILD 22.2      UP20220516       08:59:50
/input,menust,tmp,''
/GST,ON
/PLO,INFO,3
/GRO,CURL,ON
/CPLANE,1
WPSTYLE,,,,,,,,0
/UNITS
/UNITS, Si
*AFUN,DEG
/PREP7
SAVE
BLC5,0,0,1.2,0.6
SAVE
SAVE,'stage2.1','db','B:\KPI\term6\AnsysWork\lab9\'
CYL4,0,0,0.36/2
FLST,2,2,5,ORDE,2
FITEM,2,1
FITEM,2,-2
FLST,2,2,5,ORDE,2
FITEM,2,1
FITEM,2,-2
FLST,2,2,5,ORDE,2
FITEM,2,1
FITEM,2,-2
RESUME
/COM,ANSYS RELEASE 2022 R2           BUILD 22.2      UP20220516       22:52:38
/COM,ANSYS RELEASE 2022 R2           BUILD 22.2      UP20220516       09:10:15
CYL4,0,0,0.36/2
GPLOT
FLST,3,2,5,ORDE,2
FITEM,3,1
FITEM,3,-2
ASBA,       1,P51X
SAVE
SAVE,'stage2.2','db','B:\KPI\term6\AnsysWork\lab9\'
FLST,2,2,4,ORDE,2
FITEM,2,2
FITEM,2,4
LDIV,P51X,0.5, ,2,0
SAVE
SAVE,'stage2.3','db','B:\KPI\term6\AnsysWork\lab9\'
/NOPR
KEYW,PR_SET,1
KEYW,PR_STRUC,1
KEYW,PR_THERM,0
KEYW,PR_FLUID,0
KEYW,PR_ELMAG,0
KEYW,MAGNOD,0
KEYW,MAGEDG,0
KEYW,MAGHFE,0
KEYW,MAGELC,0
KEYW,PR_MULTI,0
/GO
/COM,
/COM,Preferences for GUI filtering have been set to display:
/COM,  Structural
ET,1,PLANE182
KEYOPT,1,1,0
KEYOPT,1,3,3
KEYOPT,1,6,0
R,1,5/1000,
SAVE,'stage4.9','db','B:\KPI\term6\AnsysWork\lab9\'
SAVE
MPTEMP,,,,,,,,
MPTEMP,1,0
MPDATA,EX,1,,2.05E+11
MPDATA,PRXY,1,,0.27
MPTEMP,,,,,,,,
MPTEMP,1,0
MPDATA,DENS,1,,7800
SAVE,'stage4.10','db','B:\KPI\term6\AnsysWork\lab9\'
ESIZE,0.025,0,
MSHKEY,0
CM,_Y,AREA
ASEL, , , ,       3
CM,_Y1,AREA
CHKMSH,'AREA'
CMSEL,S,_Y
AMESH,_Y1
CMDELE,_Y
CMDELE,_Y1
CMDELE,_Y2
/LIG,   1,1, 1.000,   0.00000000000    ,   0.00000000000    ,   0.00000000000    ,   0.00000000000
/SHRINK,0
/ESHAPE,1.0
/EFACET,1
/RATIO,1,1,1
/CFORMAT,32,0
/BATCH
/COM,ANSYS RELEASE 2022 R2           BUILD 22.2      UP20220516       22:53:19
/input,menust,tmp,''
/GST,ON
/PLO,INFO,3
/GRO,CURL,ON
/CPLANE,1
WPSTYLE,,,,,,,,0
/input,menust,tmp,''
/GST,ON
/PLO,INFO,3
/GRO,CURL,ON
/CPLANE,1
WPSTYLE,,,,,,,,0
/UNITS
/UNITS, Si
*AFUN,DEG
/PREP7
SAVE
BLC5,0,0,1.2,0.6
SAVE
SAVE,'stage2.1','db','B:\KPI\term6\AnsysWork\lab9\'
CYL4,0,0,0.36/2
FLST,2,2,5,ORDE,2
FITEM,2,1
FITEM,2,-2
FLST,2,2,5,ORDE,2
FITEM,2,1
FITEM,2,-2
FLST,2,2,5,ORDE,2
FITEM,2,1
FITEM,2,-2
RESUME
/COM,ANSYS RELEASE 2022 R2           BUILD 22.2      UP20220516       22:55:02
/COM,ANSYS RELEASE 2022 R2           BUILD 22.2      UP20220516       09:10:15
CYL4,0,0,0.36/2
GPLOT
FLST,3,2,5,ORDE,2
FITEM,3,1
FITEM,3,-2
ASBA,       1,P51X
SAVE
SAVE,'stage2.2','db','B:\KPI\term6\AnsysWork\lab9\'
FLST,2,2,4,ORDE,2
FITEM,2,2
FITEM,2,4
LDIV,P51X,0.5, ,2,0
SAVE
SAVE,'stage2.3','db','B:\KPI\term6\AnsysWork\lab9\'
/NOPR
KEYW,PR_SET,1
KEYW,PR_STRUC,1
KEYW,PR_THERM,0
KEYW,PR_FLUID,0
KEYW,PR_ELMAG,0
KEYW,MAGNOD,0
KEYW,MAGEDG,0
KEYW,MAGHFE,0
KEYW,MAGELC,0
KEYW,PR_MULTI,0
/GO
/COM,
/COM,Preferences for GUI filtering have been set to display:
/COM,  Structural
ET,1,PLANE182
KEYOPT,1,1,0
KEYOPT,1,3,3
KEYOPT,1,6,0
R,1,5/1000,
SAVE,'stage4.9','db','B:\KPI\term6\AnsysWork\lab9\'
SAVE
MPTEMP,,,,,,,,
MPTEMP,1,0
MPDATA,EX,1,,2.05E+11
MPDATA,PRXY,1,,0.27
MPTEMP,,,,,,,,
MPTEMP,1,0
MPDATA,DENS,1,,7800
SAVE,'stage4.10','db','B:\KPI\term6\AnsysWork\lab9\'
ESIZE,0.025,0,
MSHKEY,0
CM,_Y,AREA
ASEL, , , ,       3
CM,_Y1,AREA
CHKMSH,'AREA'
CMSEL,S,_Y
AMESH,_Y1
CMDELE,_Y
CMDELE,_Y1
CMDELE,_Y2
/LIG,   1,1, 1.000,   0.00000000000    ,   0.00000000000    ,   0.00000000000    ,   0.00000000000
/SHRINK,0
/ESHAPE,1.0
/EFACET,1
/RATIO,1,1,1
/CFORMAT,32,0
SAVE,'stage5.12','db','B:\KPI\term6\AnsysWork\lab9\'
FINISH
/SOL
ANTYPE,0
FLST,2,2,3,ORDE,2
FITEM,2,6
FITEM,2,8
/GO
DK,P51X, ,0, ,0,UY, , , , , ,
FLST,2,2,3,ORDE,2
FITEM,2,5
FITEM,2,7
/GO
DK,P51X, ,0, ,0,UX, , , , , ,
GPLOT
RESUME,'LabWork09pln','db','B:\KPI\TERM6\ANSYSWORK\LAB9\',0,0
/COM,ANSYS RELEASE 2022 R2           BUILD 22.2      UP20220516       22:55:28
RESUME,'LabWork09pln','dbb','B:\KPI\TERM6\ANSYSWORK\LAB9\',0,0
/COM,ANSYS RELEASE 2022 R2           BUILD 22.2      UP20220516       22:55:31
RESUME,'save15','db','B:\KPI\TERM6\ANSYSWORK\LAB9\',0,0
/COM,ANSYS RELEASE 2022 R2           BUILD 22.2      UP20220516       22:55:53
FINISH
/PREP7
FINISH
/SOL
FLST,2,1,4,ORDE,1
FITEM,2,4
/GO
SFL,P51X,PRES,-70e7,
FLST,2,3,4,ORDE,3
FITEM,2,2
FITEM,2,10
FITEM,2,12
/GO
SFL,P51X,PRES,-700000000,
/PSF,PRES,NORM,2,0,1
/PBF,DEFA, ,1
/PSYMB,CS,0
/PSYMB,NDIR,0
/PSYMB,ESYS,0
/PSYMB,LDIV,0
/PSYMB,LDIR,0
/PSYMB,ADIR,0
/PSYMB,ECON,0
/PSYMB,XNODE,0
/PSYMB,DOT,1
/PSYMB,PCONV,
/PSYMB,LAYR,0
/PSYMB,FBCS,0
/PBC,ALL,,1
/PBC,NFOR,,0
/PBC,NMOM,,0
/PBC,RFOR,,0
/PBC,RMOM,,0
/PBC,PATH,,0
SBCTRAN
GPLOT
/STATUS,SOLU
SOLVE
FINISH
/CLEAR,NOSTART
/COM,ANSYS RELEASE 2022 R2           BUILD 22.2      UP20220516       22:59:49
/SOLU
FINISH
/PREP7
BLC5,0,0,0.5,0.25
CYL4,0,0,0.15/2
FLST,2,2,5,ORDE,2
FITEM,2,1
FITEM,2,-2
ASBA,       2,       1
ASBA,       1,       2
/Units, Si
*AFUN,DEG
FLST,2,8,4,ORDE,2
FITEM,2,1
FITEM,2,-8
LDIV,P51X,0.5, ,2,0
/NOPR
KEYW,PR_SET,1
KEYW,PR_STRUC,1
KEYW,PR_THERM,0
KEYW,PR_FLUID,0
KEYW,PR_ELMAG,0
KEYW,MAGNOD,0
KEYW,MAGEDG,0
KEYW,MAGHFE,0
KEYW,MAGELC,0
KEYW,PR_MULTI,0
/GO
/COM,
/COM,Preferences for GUI filtering have been set to display:
/COM,  Structural
ET,1,SOLID185
ETDEL,1
ET,1,PLANE182
KEYOPT,1,1,0
KEYOPT,1,3,3
KEYOPT,1,6,0
R,1,0.005,
MPTEMP,,,,,,,,
MPTEMP,1,0
MPDATA,EX,1,,2.05e11
MPDATA,PRXY,1,,0.27
MPTEMP,,,,,,,,
MPTEMP,1,0
MPDATA,DENS,1,,7800
ESIZE,0.025,0,
MSHKEY,0
CM,_Y,AREA
ASEL, , , ,       3
CM,_Y1,AREA
CHKMSH,'AREA'
CMSEL,S,_Y
AMESH,_Y1
CMDELE,_Y
CMDELE,_Y1
CMDELE,_Y2
SAVE,'save12','db','B:\KPI\TERM6\ANSYSWORK\LAB9\'
FINISH
/SOL
ANTYPE,0
FLST,2,2,3,ORDE,2
FITEM,2,6
FITEM,2,8
/GO
DK,P51X, ,0, ,0,UX, , , , , ,
FLST,2,2,3,ORDE,2
FITEM,2,5
FITEM,2,7
/GO
DK,P51X, ,0, ,0,UY, , , , , ,
SAVE,'15','db','B:\KPI\TERM6\ANSYSWORK\LAB9\'
FLST,2,4,4,ORDE,4
FITEM,2,2
FITEM,2,4
FITEM,2,10
FITEM,2,12
/GO
SFL,P51X,PRES,-70e7,
/PSF,PRES,NORM,2,0,1
/PBF,DEFA, ,1
/PSYMB,CS,0
/PSYMB,NDIR,0
/PSYMB,ESYS,0
/PSYMB,LDIV,0
/PSYMB,LDIR,0
/PSYMB,ADIR,0
/PSYMB,ECON,0
/PSYMB,XNODE,0
/PSYMB,DOT,1
/PSYMB,PCONV,
/PSYMB,LAYR,0
/PSYMB,FBCS,0
/PBC,ALL,,1
/PBC,NFOR,,0
/PBC,NMOM,,0
/PBC,RFOR,,0
/PBC,RMOM,,0
/PBC,PATH,,0
SBCTRAN
GPLOT
SAVE,'save17','db','B:\KPI\TERM6\ANSYSWORK\LAB9\'
/SHRINK,0
/ESHAPE,1.0
/EFACET,1
/RATIO,1,1,1
/CFORMAT,32,0
/STATUS,SOLU
SOLVE
FINISH
/POST1
SET,LAST
/EFACET,1
PLNSOL, U,SUM, 1,1.0
SAVE,'save18','db','B:\KPI\TERM6\ANSYSWORK\LAB9\'
FINISH
! /EXIT,ALL
/BATCH
/COM,ANSYS RELEASE 2022 R2           BUILD 22.2      UP20220516       01:50:49
/input,menust,tmp,''
/GST,ON
/PLO,INFO,3
/GRO,CURL,ON
/CPLANE,1
WPSTYLE,,,,,,,,0
RESUME,'saveRight','db','B:\KPI\term6\AnsysWork\lab9\',0,0
/COM,ANSYS RELEASE 2022 R2           BUILD 22.2      UP20220516       01:51:06
/POST1
PLESOL, S,EQV, 0,1.0
/EFACET,1
PLNSOL, U,SUM, 1,1.0
PRRSOL,
FINISH
! /EXIT,ALL
/BATCH
/COM,ANSYS RELEASE 2022 R2           BUILD 22.2      UP20220516       08:27:35
/input,menust,tmp,''
/GST,ON
/PLO,INFO,3
/GRO,CURL,ON
/CPLANE,1
WPSTYLE,,,,,,,,0
RESUME,'saveRight','db','B:\KPI\term6\AnsysWork\lab9\part1\',0,0
/COM,ANSYS RELEASE 2022 R2           BUILD 22.2      UP20220516       08:57:21
/POST1
SET,LAST
/EFACET,1
PLNSOL, U,SUM, 1,1.0
RESUME,'saveRight','dbb','B:\KPI\term6\AnsysWork\lab9\part1\',0,0
/COM,ANSYS RELEASE 2022 R2           BUILD 22.2      UP20220516       08:58:09
SET,LAST
/EFACET,1
PLNSOL, U,SUM, 1,1.0
PLESOL, S,EQV, 0,1.0
FINISH
! /EXIT,NOSAV
/BATCH
/COM,ANSYS RELEASE 2022 R2           BUILD 22.2      UP20220516       09:02:28
/input,menust,tmp,''
/GST,ON
/PLO,INFO,3
/GRO,CURL,ON
/CPLANE,1
WPSTYLE,,,,,,,,0
RESUME,'saveRight','db','B:\KPI\term6\AnsysWork\lab9\part1\',0,0
/COM,ANSYS RELEASE 2022 R2           BUILD 22.2      UP20220516       09:02:34
/POST1
FINISH
/SOL
FINISH
/AUX12
FINISH
/POST1
/PSF,PRES,NORM,2,0,1
/PBF,DEFA, ,1
/PSYMB,CS,0
/PSYMB,NDIR,0
/PSYMB,ESYS,0
/PSYMB,LDIV,0
/PSYMB,LDIR,0
/PSYMB,ADIR,0
/PSYMB,ECON,0
/PSYMB,XNODE,0
/PSYMB,DOT,1
/PSYMB,PCONV,
/PSYMB,LAYR,0
/PSYMB,FBCS,0
/PBC,ALL,,1
/PBC,NFOR,,0
/PBC,NMOM,,0
/PBC,RFOR,,0
/PBC,RMOM,,0
/PBC,PATH,,0
SET,LAST
PLESOL, S,EQV, 0,1.0
SET,NEXT
PLESOL, S,EQV, 0,1.0
SET,PREVIOUS
PLESOL, S,EQV, 0,1.0
FINISH
/SOL
/STATUS,SOLU
SOLVE
FINISH
/POST1
SET,LAST
PLESOL, S,EQV, 0,1.0
FINISH
! /EXIT,ALL
