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/BATCH
/COM,ANSYS RELEASE 2022 R2           BUILD 22.2      UP20220516       01:20:58
/input,menust,tmp,''
/GST,ON
/PLO,INFO,3
/GRO,CURL,ON
/CPLANE,1
WPSTYLE,,,,,,,,0
RESUME,'saveRight','db','B:\KPI\term6\AnsysWork\lab9\',0,0
/COM,ANSYS RELEASE 2022 R2           BUILD 22.2      UP20220516       01:21:11
/SOLU
FINISH
/PREP7
FINISH
/POST1
SET,LAST
FINISH
/SOL
/STATUS,SOLU
SOLVE
FINISH
/POST26
FILE,'saveRight','rst','.'
NUMVAR,200
SOLU,191,NCMIT
STORE,MERGE
FILLDATA,191,,,,1,1
REALVAR,191,191
FINISH
/POST1
SET,LAST
/EFACET,1
PLNSOL, U,SUM, 1,1.0
SAVE
SAVE,'saveRight','db','B:\KPI\TERM6\ANSYSWORK\LAB9\'
FINISH
! /EXIT,ALL
